// SBML level 2 version 3

model Neg_Feed_Oscillate()

  // Compartments:
  compartment cell = 1;

  // Species:
  species X in cell = 0; X is "X()";
  species Y_c_0 in cell = 1/cell; Y_c_0 is "Y(c~0)";
  species Y_c_P in cell = 0; Y_c_P is "Y(c~P)";
  species R_c_0 in cell = 1/cell; R_c_0 is "R(c~0)";
  species R_c_P in cell = 0; R_c_P is "R(c~P)";

  // Parameters:
  log_k1 = 0;
  log_k2 = -4.605;
  log_k2p = 2.303;
  log_k3 = -2.303;
  log_Km3 = -4.605;
  log_k4 = -1.609;
  log_Km4 = -4.605;
  log_k5 = -2.303;
  log_Km5 = -4.607;
  log_k6 = -2.996;
  log_Km6 = -4.607;
  dummy = 0;
  _rateLaw1 = exp(log_k1);
  _rateLaw2 = exp(log_k2);
  _rateLaw3 = exp(log_k2p);

  // Assignment rules:
  XT := 0 + X;
  YP := 0 + Y_c_P;
  YT := Y_c_0 + Y_c_P;
  RP := 0 + R_c_P;
  RT := R_c_0 + R_c_P;
  _rateLaw4 := exp(log_k3)/(exp(log_Km3) + (YT - YP));
  _rateLaw5 := exp(log_k4)/(exp(log_Km4) + YP);
  _rateLaw6 := exp(log_k5)/(exp(log_Km5) + (RT - RP));
  _rateLaw7 := exp(log_k6)/(exp(log_Km6) + RP);

  // Reactions:
  R1: => X; _rateLaw1;
  R2: X => ; _rateLaw2*X;
  R3: X + R_c_P => R_c_P; _rateLaw3*X*R_c_P;
  R4: X + Y_c_0 => X + Y_c_P; _rateLaw4*X*Y_c_0;
  R5: Y_c_P => Y_c_0; _rateLaw5*Y_c_P;
  R6: Y_c_P + R_c_0 => Y_c_P + R_c_P; _rateLaw6*Y_c_P*R_c_0;
  R7: R_c_P => R_c_0; _rateLaw7*R_c_P;

  // Unit definitions:
  unit substance = item;
end
