// SBML level 2 version 3

model Shp2()

  // Compartments:
  compartment cell = 1;

  // Species:
  species S_CSH2_NSH2_C_PTP_C in cell = 10^S_tot; S_CSH2_NSH2_C_PTP_C is "S(CSH2,NSH2~C,PTP~C)";
  species S2 in cell = 10^R_dim; S2 is "R(DD!1,Y1~U,Y2~P).R(DD!1,Y1~U,Y2~P)";
  species S3 in cell = 0; S3 is "R(DD!1,Y1~P,Y2~P).R(DD!1,Y1~U,Y2~P)";
  species S_CSH2_NSH2_O_PTP_O in cell = 0; S_CSH2_NSH2_O_PTP_O is "S(CSH2,NSH2~O,PTP~O)";
  species S5 in cell = 0; S5 is "R(DD!1,Y1~U,Y2~P!2).R(DD!1,Y1~U,Y2~P).S(CSH2!2,NSH2~C,PTP~C)";
  species S6 in cell = 0; S6 is "R(DD!1,Y1~P,Y2~P).R(DD!1,Y1~P,Y2~P)";
  species S7 in cell = 0; S7 is "R(DD!1,Y1~P,Y2~P!2).R(DD!1,Y1~U,Y2~P).S(CSH2!2,NSH2~C,PTP~C)";
  species S8 in cell = 0; S8 is "R(DD!1,Y1~P,Y2~P).R(DD!1,Y1~U,Y2~P!2).S(CSH2!2,NSH2~C,PTP~C)";
  species S9 in cell = 0; S9 is "R(DD!1,Y1~U,Y2~P!2).R(DD!1,Y1~U,Y2~P).S(CSH2!2,NSH2~O,PTP~O)";
  species S10 in cell = 0; S10 is "R(DD!1,Y1~P,Y2~P!2).R(DD!1,Y1~U,Y2~P).S(CSH2!2,NSH2~O,PTP~O)";
  species S11 in cell = 0; S11 is "R(DD!1,Y1~P,Y2~P).R(DD!1,Y1~U,Y2~P!2).S(CSH2!2,NSH2~O,PTP~O)";
  species S12 in cell = 0; S12 is "R(DD!1,Y1~U,Y2~P!2).R(DD!1,Y1~U,Y2~P!3).S(CSH2!2,NSH2~C,PTP~C).S(CSH2!3,NSH2~C,PTP~C)";
  species S13 in cell = 0; S13 is "R(DD!1,Y1~U,Y2~P!2).R(DD!1,Y1~U,Y2~P!3).S(CSH2!2,NSH2~C,PTP~C).S(CSH2!3,NSH2~O,PTP~O)";
  species S14 in cell = 0; S14 is "R(DD!1,Y1~U,Y2~P!2).R(DD!1,Y1~U,Y2~P).S(CSH2,NSH2~O!2,PTP~O)";
  species S15 in cell = 0; S15 is "R(DD!1,Y1~P,Y2~P!2).R(DD!1,Y1~U,Y2~P).S(CSH2,NSH2~O!2,PTP~O)";
  species S16 in cell = 0; S16 is "R(DD!1,Y1~P,Y2~P).R(DD!1,Y1~U,Y2~P!2).S(CSH2,NSH2~O!2,PTP~O)";
  species S17 in cell = 0; S17 is "R(DD!1,Y1~U,Y2~P!2).R(DD!1,Y1~U,Y2~P!3).S(CSH2!2,NSH2~C,PTP~C).S(CSH2,NSH2~O!3,PTP~O)";
  species S18 in cell = 0; S18 is "R(DD!1,Y1~P!2,Y2~P).R(DD!1,Y1~U,Y2~P).S(CSH2,NSH2~O,PTP~O!2)";
  species S19 in cell = 0; S19 is "R(DD!1,Y1~P,Y2~P!2).R(DD!1,Y1~P,Y2~P).S(CSH2!2,NSH2~C,PTP~C)";
  species S20 in cell = 0; S20 is "R(DD!1,Y1~P,Y2~P!2).R(DD!1,Y1~P,Y2~P).S(CSH2!2,NSH2~O,PTP~O)";
  species S21 in cell = 0; S21 is "R(DD!1,Y1~P,Y2~P!2).R(DD!1,Y1~U,Y2~P!3).S(CSH2!2,NSH2~C,PTP~C).S(CSH2!3,NSH2~C,PTP~C)";
  species S22 in cell = 0; S22 is "R(DD!1,Y1~P,Y2~P!2).R(DD!1,Y1~U,Y2~P!3).S(CSH2!2,NSH2~C,PTP~C).S(CSH2!3,NSH2~O,PTP~O)";
  species S23 in cell = 0; S23 is "R(DD!1,Y1~P,Y2~P!2).R(DD!1,Y1~U,Y2~P!3).S(CSH2!3,NSH2~C,PTP~C).S(CSH2!2,NSH2~O,PTP~O)";
  species S24 in cell = 0; S24 is "R(DD!1,Y1~P,Y2~P!2).R(DD!1,Y1~P,Y2~P).S(CSH2,NSH2~O!2,PTP~O)";
  species S25 in cell = 0; S25 is "R(DD!1,Y1~P,Y2~P!2).R(DD!1,Y1~U,Y2~P!3).S(CSH2!2,NSH2~C,PTP~C).S(CSH2,NSH2~O!3,PTP~O)";
  species S26 in cell = 0; S26 is "R(DD!1,Y1~P,Y2~P!2).R(DD!1,Y1~U,Y2~P!3).S(CSH2!3,NSH2~C,PTP~C).S(CSH2,NSH2~O!2,PTP~O)";
  species S27 in cell = 0; S27 is "R(DD!1,Y1~P!2,Y2~P).R(DD!1,Y1~P,Y2~P).S(CSH2,NSH2~O,PTP~O!2)";
  species S28 in cell = 0; S28 is "R(DD!1,Y1~U,Y2~P!2).R(DD!1,Y1~U,Y2~P!3).S(CSH2!2,NSH2~O,PTP~O).S(CSH2!3,NSH2~O,PTP~O)";
  species S29 in cell = 0; S29 is "R(DD!1,Y1~U,Y2~P!2).R(DD!1,Y1~U,Y2~P!3).S(CSH2!2,NSH2~O,PTP~O).S(CSH2,NSH2~O!3,PTP~O)";
  species S30 in cell = 0; S30 is "R(DD!1,Y1~P,Y2~P!2).R(DD!1,Y1~U,Y2~P!3).S(CSH2!2,NSH2~O,PTP~O).S(CSH2!3,NSH2~O,PTP~O)";
  species S31 in cell = 0; S31 is "R(DD!1,Y1~P,Y2~P!2).R(DD!1,Y1~U,Y2~P!3).S(CSH2!3,NSH2~O,PTP~O).S(CSH2,NSH2~O!2,PTP~O)";
  species S32 in cell = 0; S32 is "R(DD!1,Y1~P,Y2~P!2).R(DD!1,Y1~U,Y2~P!3).S(CSH2!2,NSH2~O,PTP~O).S(CSH2,NSH2~O!3,PTP~O)";
  species S33 in cell = 0; S33 is "R(DD!1,Y1~P!2,Y2~P!3).R(DD!1,Y1~U,Y2~P).S(CSH2!3,NSH2~C,PTP~C).S(CSH2,NSH2~O,PTP~O!2)";
  species S34 in cell = 0; S34 is "R(DD!1,Y1~P!2,Y2~P!3).R(DD!1,Y1~U,Y2~P).S(CSH2!3,NSH2~O,PTP~O).S(CSH2,NSH2~O,PTP~O!2)";
  species S35 in cell = 0; S35 is "R(DD!1,Y1~P!2,Y2~P).R(DD!1,Y1~U,Y2~P!3).S(CSH2!3,NSH2~C,PTP~C).S(CSH2,NSH2~O,PTP~O!2)";
  species S36 in cell = 0; S36 is "R(DD!1,Y1~P!2,Y2~P).R(DD!1,Y1~U,Y2~P!3).S(CSH2!3,NSH2~O,PTP~O).S(CSH2,NSH2~O,PTP~O!2)";
  species S37 in cell = 0; S37 is "R(DD!1,Y1~U,Y2~P!2).R(DD!1,Y1~U,Y2~P!3).S(CSH2,NSH2~O!2,PTP~O).S(CSH2,NSH2~O!3,PTP~O)";
  species S38 in cell = 0; S38 is "R(DD!1,Y1~P,Y2~P!2).R(DD!1,Y1~U,Y2~P!3).S(CSH2,NSH2~O!2,PTP~O).S(CSH2,NSH2~O!3,PTP~O)";
  species S39 in cell = 0; S39 is "R(DD!1,Y1~P!2,Y2~P!3).R(DD!1,Y1~U,Y2~P).S(CSH2,NSH2~O!3,PTP~O).S(CSH2,NSH2~O,PTP~O!2)";
  species S40 in cell = 0; S40 is "R(DD!1,Y1~P!2,Y2~P).R(DD!1,Y1~U,Y2~P!3).S(CSH2,NSH2~O!3,PTP~O).S(CSH2,NSH2~O,PTP~O!2)";
  species S41 in cell = 0; S41 is "R(DD!1,Y1~U,Y2~P!2).R(DD!1,Y1~U,Y2~P!3).S(CSH2!2,NSH2~O!3,PTP~O)";
  species S42 in cell = 0; S42 is "R(DD!1,Y1~P,Y2~P!2).R(DD!1,Y1~U,Y2~P!3).S(CSH2!2,NSH2~O!3,PTP~O)";
  species S43 in cell = 0; S43 is "R(DD!1,Y1~P,Y2~P!2).R(DD!1,Y1~U,Y2~P!3).S(CSH2!3,NSH2~O!2,PTP~O)";
  species S44 in cell = 0; S44 is "R(DD!1,Y1~P!2,Y2~P!3).R(DD!1,Y1~U,Y2~P).S(CSH2!3,NSH2~O,PTP~O!2)";
  species S45 in cell = 0; S45 is "R(DD!1,Y1~P!2,Y2~P).R(DD!1,Y1~U,Y2~P!3).S(CSH2!3,NSH2~O,PTP~O!2)";
  species S46 in cell = 0; S46 is "R(DD!1,Y1~P!2,Y2~P).R(DD!1,Y1~U,Y2~P!3).S(CSH2,NSH2~O!3,PTP~O!2)";
  species S47 in cell = 0; S47 is "R(DD!1,Y1~P!2,Y2~P!3).R(DD!1,Y1~U,Y2~P).S(CSH2,NSH2~O!3,PTP~O!2)";
  species S48 in cell = 0; S48 is "R(DD!1,Y1~P,Y2~P!2).R(DD!1,Y1~P,Y2~P!3).S(CSH2!2,NSH2~C,PTP~C).S(CSH2!3,NSH2~C,PTP~C)";
  species S49 in cell = 0; S49 is "R(DD!1,Y1~P,Y2~P!2).R(DD!1,Y1~P,Y2~P!3).S(CSH2!2,NSH2~C,PTP~C).S(CSH2!3,NSH2~O,PTP~O)";
  species S50 in cell = 0; S50 is "R(DD!1,Y1~P,Y2~P!2).R(DD!1,Y1~P,Y2~P!3).S(CSH2!2,NSH2~C,PTP~C).S(CSH2,NSH2~O!3,PTP~O)";
  species S51 in cell = 0; S51 is "R(DD!1,Y1~P,Y2~P!2).R(DD!1,Y1~P,Y2~P!3).S(CSH2!2,NSH2~O,PTP~O).S(CSH2!3,NSH2~O,PTP~O)";
  species S52 in cell = 0; S52 is "R(DD!1,Y1~P,Y2~P!2).R(DD!1,Y1~P,Y2~P!3).S(CSH2!3,NSH2~O,PTP~O).S(CSH2,NSH2~O!2,PTP~O)";
  species S53 in cell = 0; S53 is "R(DD!1,Y1~P!2,Y2~P!3).R(DD!1,Y1~P,Y2~P).S(CSH2!3,NSH2~C,PTP~C).S(CSH2,NSH2~O,PTP~O!2)";
  species S54 in cell = 0; S54 is "R(DD!1,Y1~P!2,Y2~P!3).R(DD!1,Y1~P,Y2~P).S(CSH2!3,NSH2~O,PTP~O).S(CSH2,NSH2~O,PTP~O!2)";
  species S55 in cell = 0; S55 is "R(DD!1,Y1~P!2,Y2~P).R(DD!1,Y1~P,Y2~P!3).S(CSH2!3,NSH2~C,PTP~C).S(CSH2,NSH2~O,PTP~O!2)";
  species S56 in cell = 0; S56 is "R(DD!1,Y1~P!2,Y2~P).R(DD!1,Y1~P,Y2~P!3).S(CSH2!3,NSH2~O,PTP~O).S(CSH2,NSH2~O,PTP~O!2)";
  species S57 in cell = 0; S57 is "R(DD!1,Y1~P,Y2~P!2).R(DD!1,Y1~P,Y2~P!3).S(CSH2,NSH2~O!2,PTP~O).S(CSH2,NSH2~O!3,PTP~O)";
  species S58 in cell = 0; S58 is "R(DD!1,Y1~P!2,Y2~P!3).R(DD!1,Y1~P,Y2~P).S(CSH2,NSH2~O!3,PTP~O).S(CSH2,NSH2~O,PTP~O!2)";
  species S59 in cell = 0; S59 is "R(DD!1,Y1~P!2,Y2~P).R(DD!1,Y1~P,Y2~P!3).S(CSH2,NSH2~O!3,PTP~O).S(CSH2,NSH2~O,PTP~O!2)";
  species S60 in cell = 0; S60 is "R(DD!1,Y1~P,Y2~P!2).R(DD!1,Y1~P,Y2~P!3).S(CSH2!2,NSH2~O!3,PTP~O)";
  species S61 in cell = 0; S61 is "R(DD!1,Y1~P!2,Y2~P!3).R(DD!1,Y1~P,Y2~P).S(CSH2!3,NSH2~O,PTP~O!2)";
  species S62 in cell = 0; S62 is "R(DD!1,Y1~P!2,Y2~P).R(DD!1,Y1~P,Y2~P!3).S(CSH2!3,NSH2~O,PTP~O!2)";
  species S63 in cell = 0; S63 is "R(DD!1,Y1~P!2,Y2~P).R(DD!1,Y1~P,Y2~P!3).S(CSH2,NSH2~O!3,PTP~O!2)";
  species S64 in cell = 0; S64 is "R(DD!1,Y1~P!2,Y2~P!3).R(DD!1,Y1~P,Y2~P).S(CSH2,NSH2~O!3,PTP~O!2)";
  species S65 in cell = 0; S65 is "R(DD!1,Y1~P!2,Y2~P!3).R(DD!1,Y1~U,Y2~P!4).S(CSH2!3,NSH2~C,PTP~C).S(CSH2!4,NSH2~C,PTP~C).S(CSH2,NSH2~O,PTP~O!2)";
  species S66 in cell = 0; S66 is "R(DD!1,Y1~P!2,Y2~P!3).R(DD!1,Y1~U,Y2~P!4).S(CSH2!3,NSH2~C,PTP~C).S(CSH2!4,NSH2~O,PTP~O).S(CSH2,NSH2~O,PTP~O!2)";
  species S67 in cell = 0; S67 is "R(DD!1,Y1~P!2,Y2~P!3).R(DD!1,Y1~U,Y2~P!4).S(CSH2!4,NSH2~C,PTP~C).S(CSH2!3,NSH2~O,PTP~O).S(CSH2,NSH2~O,PTP~O!2)";
  species S68 in cell = 0; S68 is "R(DD!1,Y1~P!2,Y2~P!3).R(DD!1,Y1~U,Y2~P!4).S(CSH2!3,NSH2~O,PTP~O).S(CSH2!4,NSH2~O,PTP~O).S(CSH2,NSH2~O,PTP~O!2)";
  species S69 in cell = 0; S69 is "R(DD!1,Y1~P!2,Y2~P!3).R(DD!1,Y1~U,Y2~P!4).S(CSH2!4,NSH2~C,PTP~C).S(CSH2,NSH2~O!3,PTP~O).S(CSH2,NSH2~O,PTP~O!2)";
  species S70 in cell = 0; S70 is "R(DD!1,Y1~P!2,Y2~P!3).R(DD!1,Y1~U,Y2~P!4).S(CSH2!4,NSH2~O,PTP~O).S(CSH2,NSH2~O!3,PTP~O).S(CSH2,NSH2~O,PTP~O!2)";
  species S71 in cell = 0; S71 is "R(DD!1,Y1~P!2,Y2~P!3).R(DD!1,Y1~U,Y2~P!4).S(CSH2!3,NSH2~C,PTP~C).S(CSH2,NSH2~O!4,PTP~O).S(CSH2,NSH2~O,PTP~O!2)";
  species S72 in cell = 0; S72 is "R(DD!1,Y1~P!2,Y2~P!3).R(DD!1,Y1~U,Y2~P!4).S(CSH2!3,NSH2~O,PTP~O).S(CSH2,NSH2~O!4,PTP~O).S(CSH2,NSH2~O,PTP~O!2)";
  species S73 in cell = 0; S73 is "R(DD!1,Y1~P!2,Y2~P!3).R(DD!1,Y1~U,Y2~P!4).S(CSH2!4,NSH2~C,PTP~C).S(CSH2!3,NSH2~O,PTP~O!2)";
  species S74 in cell = 0; S74 is "R(DD!1,Y1~P!2,Y2~P!3).R(DD!1,Y1~U,Y2~P!4).S(CSH2!3,NSH2~O,PTP~O!2).S(CSH2!4,NSH2~O,PTP~O)";
  species S75 in cell = 0; S75 is "R(DD!1,Y1~P!2,Y2~P!3).R(DD!1,Y1~U,Y2~P!4).S(CSH2!3,NSH2~C,PTP~C).S(CSH2!4,NSH2~O,PTP~O!2)";
  species S76 in cell = 0; S76 is "R(DD!1,Y1~P!2,Y2~P!3).R(DD!1,Y1~U,Y2~P!4).S(CSH2!4,NSH2~O,PTP~O!2).S(CSH2!3,NSH2~O,PTP~O)";
  species S77 in cell = 0; S77 is "R(DD!1,Y1~P!2,Y2~P!3).R(DD!1,Y1~U,Y2~P!4).S(CSH2!3,NSH2~C,PTP~C).S(CSH2,NSH2~O!4,PTP~O!2)";
  species S78 in cell = 0; S78 is "R(DD!1,Y1~P!2,Y2~P!3).R(DD!1,Y1~U,Y2~P!4).S(CSH2!3,NSH2~O,PTP~O).S(CSH2,NSH2~O!4,PTP~O!2)";
  species S79 in cell = 0; S79 is "R(DD!1,Y1~P!2,Y2~P!3).R(DD!1,Y1~U,Y2~P!4).S(CSH2!4,NSH2~C,PTP~C).S(CSH2,NSH2~O!3,PTP~O!2)";
  species S80 in cell = 0; S80 is "R(DD!1,Y1~P!2,Y2~P!3).R(DD!1,Y1~U,Y2~P!4).S(CSH2!4,NSH2~O,PTP~O).S(CSH2,NSH2~O!3,PTP~O!2)";
  species S81 in cell = 0; S81 is "R(DD!1,Y1~P!2,Y2~P!3).R(DD!1,Y1~U,Y2~P!4).S(CSH2,NSH2~O!3,PTP~O).S(CSH2,NSH2~O!4,PTP~O).S(CSH2,NSH2~O,PTP~O!2)";
  species S82 in cell = 0; S82 is "R(DD!1,Y1~P!2,Y2~P!3).R(DD!1,Y1~U,Y2~P!4).S(CSH2!3,NSH2~O,PTP~O!2).S(CSH2,NSH2~O!4,PTP~O)";
  species S83 in cell = 0; S83 is "R(DD!1,Y1~P!2,Y2~P!3).R(DD!1,Y1~U,Y2~P!4).S(CSH2!4,NSH2~O,PTP~O!2).S(CSH2,NSH2~O!3,PTP~O)";
  species S84 in cell = 0; S84 is "R(DD!1,Y1~P!2,Y2~P!3).R(DD!1,Y1~U,Y2~P!4).S(CSH2,NSH2~O!4,PTP~O!2).S(CSH2,NSH2~O!3,PTP~O)";
  species S85 in cell = 0; S85 is "R(DD!1,Y1~P!2,Y2~P!3).R(DD!1,Y1~U,Y2~P!4).S(CSH2,NSH2~O!3,PTP~O!2).S(CSH2,NSH2~O!4,PTP~O)";
  species S86 in cell = 0; S86 is "R(DD!1,Y1~P!2,Y2~P).R(DD!1,Y1~P!3,Y2~P).S(CSH2,NSH2~O,PTP~O!2).S(CSH2,NSH2~O,PTP~O!3)";
  species S87 in cell = 0; S87 is "R(DD!1,Y1~P!2,Y2~P!3).R(DD!1,Y1~U,Y2~P!4).S(CSH2!3,NSH2~O!4,PTP~O).S(CSH2,NSH2~O,PTP~O!2)";
  species S88 in cell = 0; S88 is "R(DD!1,Y1~P!2,Y2~P!3).R(DD!1,Y1~U,Y2~P!4).S(CSH2!4,NSH2~O!3,PTP~O).S(CSH2,NSH2~O,PTP~O!2)";
  species S89 in cell = 0; S89 is "R(DD!1,Y1~P!2,Y2~P!3).R(DD!1,Y1~U,Y2~P!4).S(CSH2!3,NSH2~O!4,PTP~O!2)";
  species S90 in cell = 0; S90 is "R(DD!1,Y1~P!2,Y2~P!3).R(DD!1,Y1~U,Y2~P!4).S(CSH2!4,NSH2~O!3,PTP~O!2)";
  species S91 in cell = 0; S91 is "R(DD!1,Y1~P!2,Y2~P!3).R(DD!1,Y1~P,Y2~P!4).S(CSH2!3,NSH2~C,PTP~C).S(CSH2!4,NSH2~C,PTP~C).S(CSH2,NSH2~O,PTP~O!2)";
  species S92 in cell = 0; S92 is "R(DD!1,Y1~P!2,Y2~P!3).R(DD!1,Y1~P,Y2~P!4).S(CSH2!3,NSH2~C,PTP~C).S(CSH2!4,NSH2~O,PTP~O).S(CSH2,NSH2~O,PTP~O!2)";
  species S93 in cell = 0; S93 is "R(DD!1,Y1~P!2,Y2~P!3).R(DD!1,Y1~P,Y2~P!4).S(CSH2!4,NSH2~C,PTP~C).S(CSH2!3,NSH2~O,PTP~O).S(CSH2,NSH2~O,PTP~O!2)";
  species S94 in cell = 0; S94 is "R(DD!1,Y1~P!2,Y2~P!3).R(DD!1,Y1~P,Y2~P!4).S(CSH2!3,NSH2~O,PTP~O).S(CSH2!4,NSH2~O,PTP~O).S(CSH2,NSH2~O,PTP~O!2)";
  species S95 in cell = 0; S95 is "R(DD!1,Y1~P!2,Y2~P!3).R(DD!1,Y1~P,Y2~P!4).S(CSH2!4,NSH2~C,PTP~C).S(CSH2,NSH2~O!3,PTP~O).S(CSH2,NSH2~O,PTP~O!2)";
  species S96 in cell = 0; S96 is "R(DD!1,Y1~P!2,Y2~P!3).R(DD!1,Y1~P,Y2~P!4).S(CSH2!4,NSH2~O,PTP~O).S(CSH2,NSH2~O!3,PTP~O).S(CSH2,NSH2~O,PTP~O!2)";
  species S97 in cell = 0; S97 is "R(DD!1,Y1~P!2,Y2~P!3).R(DD!1,Y1~P,Y2~P!4).S(CSH2!3,NSH2~C,PTP~C).S(CSH2,NSH2~O!4,PTP~O).S(CSH2,NSH2~O,PTP~O!2)";
  species S98 in cell = 0; S98 is "R(DD!1,Y1~P!2,Y2~P!3).R(DD!1,Y1~P,Y2~P!4).S(CSH2!3,NSH2~O,PTP~O).S(CSH2,NSH2~O!4,PTP~O).S(CSH2,NSH2~O,PTP~O!2)";
  species S99 in cell = 0; S99 is "R(DD!1,Y1~P!2,Y2~P!3).R(DD!1,Y1~P,Y2~P!4).S(CSH2!4,NSH2~C,PTP~C).S(CSH2!3,NSH2~O,PTP~O!2)";
  species S100 in cell = 0; S100 is "R(DD!1,Y1~P!2,Y2~P!3).R(DD!1,Y1~P,Y2~P!4).S(CSH2!3,NSH2~O,PTP~O!2).S(CSH2!4,NSH2~O,PTP~O)";
  species S101 in cell = 0; S101 is "R(DD!1,Y1~P!2,Y2~P!3).R(DD!1,Y1~P,Y2~P!4).S(CSH2!3,NSH2~C,PTP~C).S(CSH2!4,NSH2~O,PTP~O!2)";
  species S102 in cell = 0; S102 is "R(DD!1,Y1~P!2,Y2~P!3).R(DD!1,Y1~P,Y2~P!4).S(CSH2!4,NSH2~O,PTP~O!2).S(CSH2!3,NSH2~O,PTP~O)";
  species S103 in cell = 0; S103 is "R(DD!1,Y1~P!2,Y2~P!3).R(DD!1,Y1~P,Y2~P!4).S(CSH2!3,NSH2~C,PTP~C).S(CSH2,NSH2~O!4,PTP~O!2)";
  species S104 in cell = 0; S104 is "R(DD!1,Y1~P!2,Y2~P!3).R(DD!1,Y1~P,Y2~P!4).S(CSH2!3,NSH2~O,PTP~O).S(CSH2,NSH2~O!4,PTP~O!2)";
  species S105 in cell = 0; S105 is "R(DD!1,Y1~P!2,Y2~P!3).R(DD!1,Y1~P,Y2~P!4).S(CSH2!4,NSH2~C,PTP~C).S(CSH2,NSH2~O!3,PTP~O!2)";
  species S106 in cell = 0; S106 is "R(DD!1,Y1~P!2,Y2~P!3).R(DD!1,Y1~P,Y2~P!4).S(CSH2!4,NSH2~O,PTP~O).S(CSH2,NSH2~O!3,PTP~O!2)";
  species S107 in cell = 0; S107 is "R(DD!1,Y1~P!2,Y2~P!3).R(DD!1,Y1~P,Y2~P!4).S(CSH2,NSH2~O!3,PTP~O).S(CSH2,NSH2~O!4,PTP~O).S(CSH2,NSH2~O,PTP~O!2)";
  species S108 in cell = 0; S108 is "R(DD!1,Y1~P!2,Y2~P!3).R(DD!1,Y1~P,Y2~P!4).S(CSH2!3,NSH2~O,PTP~O!2).S(CSH2,NSH2~O!4,PTP~O)";
  species S109 in cell = 0; S109 is "R(DD!1,Y1~P!2,Y2~P!3).R(DD!1,Y1~P,Y2~P!4).S(CSH2!4,NSH2~O,PTP~O!2).S(CSH2,NSH2~O!3,PTP~O)";
  species S110 in cell = 0; S110 is "R(DD!1,Y1~P!2,Y2~P!3).R(DD!1,Y1~P,Y2~P!4).S(CSH2,NSH2~O!4,PTP~O!2).S(CSH2,NSH2~O!3,PTP~O)";
  species S111 in cell = 0; S111 is "R(DD!1,Y1~P!2,Y2~P!3).R(DD!1,Y1~P,Y2~P!4).S(CSH2,NSH2~O!3,PTP~O!2).S(CSH2,NSH2~O!4,PTP~O)";
  species S112 in cell = 0; S112 is "R(DD!1,Y1~P!2,Y2~P!3).R(DD!1,Y1~P,Y2~P!4).S(CSH2!3,NSH2~O!4,PTP~O).S(CSH2,NSH2~O,PTP~O!2)";
  species S113 in cell = 0; S113 is "R(DD!1,Y1~P!2,Y2~P!3).R(DD!1,Y1~P,Y2~P!4).S(CSH2!4,NSH2~O!3,PTP~O).S(CSH2,NSH2~O,PTP~O!2)";
  species S114 in cell = 0; S114 is "R(DD!1,Y1~P!2,Y2~P!3).R(DD!1,Y1~P,Y2~P!4).S(CSH2!3,NSH2~O!4,PTP~O!2)";
  species S115 in cell = 0; S115 is "R(DD!1,Y1~P!2,Y2~P!3).R(DD!1,Y1~P,Y2~P!4).S(CSH2!4,NSH2~O!3,PTP~O!2)";
  species S116 in cell = 0; S116 is "R(DD!1,Y1~P!2,Y2~P!3).R(DD!1,Y1~P!4,Y2~P).S(CSH2!3,NSH2~C,PTP~C).S(CSH2,NSH2~O,PTP~O!2).S(CSH2,NSH2~O,PTP~O!4)";
  species S117 in cell = 0; S117 is "R(DD!1,Y1~P!2,Y2~P!3).R(DD!1,Y1~P!4,Y2~P).S(CSH2!3,NSH2~O,PTP~O).S(CSH2,NSH2~O,PTP~O!2).S(CSH2,NSH2~O,PTP~O!4)";
  species S118 in cell = 0; S118 is "R(DD!1,Y1~P!2,Y2~P!3).R(DD!1,Y1~P!4,Y2~P).S(CSH2,NSH2~O!3,PTP~O).S(CSH2,NSH2~O,PTP~O!2).S(CSH2,NSH2~O,PTP~O!4)";
  species S119 in cell = 0; S119 is "R(DD!1,Y1~P!2,Y2~P!3).R(DD!1,Y1~P!4,Y2~P).S(CSH2!3,NSH2~O,PTP~O!2).S(CSH2,NSH2~O,PTP~O!4)";
  species S120 in cell = 0; S120 is "R(DD!1,Y1~P!2,Y2~P!3).R(DD!1,Y1~P!4,Y2~P).S(CSH2!3,NSH2~O,PTP~O!4).S(CSH2,NSH2~O,PTP~O!2)";
  species S121 in cell = 0; S121 is "R(DD!1,Y1~P!2,Y2~P!3).R(DD!1,Y1~P!4,Y2~P).S(CSH2,NSH2~O!3,PTP~O!4).S(CSH2,NSH2~O,PTP~O!2)";
  species S122 in cell = 0; S122 is "R(DD!1,Y1~P!2,Y2~P!3).R(DD!1,Y1~P!4,Y2~P).S(CSH2,NSH2~O!3,PTP~O!2).S(CSH2,NSH2~O,PTP~O!4)";
  species S123 in cell = 0; S123 is "R(DD!1,Y1~P!2,Y2~P!3).R(DD!1,Y1~P!4,Y2~P!5).S(CSH2!3,NSH2~C,PTP~C).S(CSH2!5,NSH2~C,PTP~C).S(CSH2,NSH2~O,PTP~O!2).S(CSH2,NSH2~O,PTP~O!4)";
  species S124 in cell = 0; S124 is "R(DD!1,Y1~P!2,Y2~P!3).R(DD!1,Y1~P!4,Y2~P!5).S(CSH2!3,NSH2~C,PTP~C).S(CSH2!5,NSH2~O,PTP~O).S(CSH2,NSH2~O,PTP~O!2).S(CSH2,NSH2~O,PTP~O!4)";
  species S125 in cell = 0; S125 is "R(DD!1,Y1~P!2,Y2~P!3).R(DD!1,Y1~P!4,Y2~P!5).S(CSH2!3,NSH2~O,PTP~O).S(CSH2!5,NSH2~O,PTP~O).S(CSH2,NSH2~O,PTP~O!2).S(CSH2,NSH2~O,PTP~O!4)";
  species S126 in cell = 0; S126 is "R(DD!1,Y1~P!2,Y2~P!3).R(DD!1,Y1~P!4,Y2~P!5).S(CSH2!5,NSH2~C,PTP~C).S(CSH2,NSH2~O!3,PTP~O).S(CSH2,NSH2~O,PTP~O!2).S(CSH2,NSH2~O,PTP~O!4)";
  species S127 in cell = 0; S127 is "R(DD!1,Y1~P!2,Y2~P!3).R(DD!1,Y1~P!4,Y2~P!5).S(CSH2!5,NSH2~O,PTP~O).S(CSH2,NSH2~O!3,PTP~O).S(CSH2,NSH2~O,PTP~O!2).S(CSH2,NSH2~O,PTP~O!4)";
  species S128 in cell = 0; S128 is "R(DD!1,Y1~P!2,Y2~P!3).R(DD!1,Y1~P!4,Y2~P!5).S(CSH2!5,NSH2~C,PTP~C).S(CSH2!3,NSH2~O,PTP~O!2).S(CSH2,NSH2~O,PTP~O!4)";
  species S129 in cell = 0; S129 is "R(DD!1,Y1~P!2,Y2~P!3).R(DD!1,Y1~P!4,Y2~P!5).S(CSH2!3,NSH2~O,PTP~O!2).S(CSH2!5,NSH2~O,PTP~O).S(CSH2,NSH2~O,PTP~O!4)";
  species S130 in cell = 0; S130 is "R(DD!1,Y1~P!2,Y2~P!3).R(DD!1,Y1~P!4,Y2~P!5).S(CSH2!5,NSH2~C,PTP~C).S(CSH2!3,NSH2~O,PTP~O!4).S(CSH2,NSH2~O,PTP~O!2)";
  species S131 in cell = 0; S131 is "R(DD!1,Y1~P!2,Y2~P!3).R(DD!1,Y1~P!4,Y2~P!5).S(CSH2!3,NSH2~O,PTP~O!4).S(CSH2!5,NSH2~O,PTP~O).S(CSH2,NSH2~O,PTP~O!2)";
  species S132 in cell = 0; S132 is "R(DD!1,Y1~P!2,Y2~P!3).R(DD!1,Y1~P!4,Y2~P!5).S(CSH2!5,NSH2~C,PTP~C).S(CSH2,NSH2~O!3,PTP~O!4).S(CSH2,NSH2~O,PTP~O!2)";
  species S133 in cell = 0; S133 is "R(DD!1,Y1~P!2,Y2~P!3).R(DD!1,Y1~P!4,Y2~P!5).S(CSH2!5,NSH2~O,PTP~O).S(CSH2,NSH2~O!3,PTP~O!4).S(CSH2,NSH2~O,PTP~O!2)";
  species S134 in cell = 0; S134 is "R(DD!1,Y1~P!2,Y2~P!3).R(DD!1,Y1~P!4,Y2~P!5).S(CSH2!5,NSH2~C,PTP~C).S(CSH2,NSH2~O!3,PTP~O!2).S(CSH2,NSH2~O,PTP~O!4)";
  species S135 in cell = 0; S135 is "R(DD!1,Y1~P!2,Y2~P!3).R(DD!1,Y1~P!4,Y2~P!5).S(CSH2!5,NSH2~O,PTP~O).S(CSH2,NSH2~O!3,PTP~O!2).S(CSH2,NSH2~O,PTP~O!4)";
  species S136 in cell = 0; S136 is "R(DD!1,Y1~P!2,Y2~P!3).R(DD!1,Y1~P!4,Y2~P!5).S(CSH2,NSH2~O!3,PTP~O).S(CSH2,NSH2~O!5,PTP~O).S(CSH2,NSH2~O,PTP~O!2).S(CSH2,NSH2~O,PTP~O!4)";
  species S137 in cell = 0; S137 is "R(DD!1,Y1~P!2,Y2~P!3).R(DD!1,Y1~P!4,Y2~P!5).S(CSH2!3,NSH2~O,PTP~O!2).S(CSH2,NSH2~O!5,PTP~O).S(CSH2,NSH2~O,PTP~O!4)";
  species S138 in cell = 0; S138 is "R(DD!1,Y1~P!2,Y2~P!3).R(DD!1,Y1~P!4,Y2~P!5).S(CSH2!3,NSH2~O,PTP~O!4).S(CSH2,NSH2~O!5,PTP~O).S(CSH2,NSH2~O,PTP~O!2)";
  species S139 in cell = 0; S139 is "R(DD!1,Y1~P!2,Y2~P!3).R(DD!1,Y1~P!4,Y2~P!5).S(CSH2,NSH2~O!3,PTP~O!4).S(CSH2,NSH2~O!5,PTP~O).S(CSH2,NSH2~O,PTP~O!2)";
  species S140 in cell = 0; S140 is "R(DD!1,Y1~P!2,Y2~P!3).R(DD!1,Y1~P!4,Y2~P!5).S(CSH2,NSH2~O!3,PTP~O!2).S(CSH2,NSH2~O!5,PTP~O).S(CSH2,NSH2~O,PTP~O!4)";
  species S141 in cell = 0; S141 is "R(DD!1,Y1~P!2,Y2~P!3).R(DD!1,Y1~P!4,Y2~P!5).S(CSH2!3,NSH2~O!5,PTP~O).S(CSH2,NSH2~O,PTP~O!2).S(CSH2,NSH2~O,PTP~O!4)";
  species S142 in cell = 0; S142 is "R(DD!1,Y1~P!2,Y2~P!3).R(DD!1,Y1~P!4,Y2~P!5).S(CSH2!3,NSH2~O!5,PTP~O!2).S(CSH2,NSH2~O,PTP~O!4)";
  species S143 in cell = 0; S143 is "R(DD!1,Y1~P!2,Y2~P!3).R(DD!1,Y1~P!4,Y2~P!5).S(CSH2!5,NSH2~O!3,PTP~O!2).S(CSH2,NSH2~O,PTP~O!4)";
  species S144 in cell = 0; S144 is "R(DD!1,Y1~P!2,Y2~P!3).R(DD!1,Y1~P!4,Y2~P!5).S(CSH2!3,NSH2~O,PTP~O!2).S(CSH2!5,NSH2~O,PTP~O!4)";
  species S145 in cell = 0; S145 is "R(DD!1,Y1~P!2,Y2~P!3).R(DD!1,Y1~P!4,Y2~P!5).S(CSH2!5,NSH2~O,PTP~O!4).S(CSH2,NSH2~O!3,PTP~O!2)";
  species S146 in cell = 0; S146 is "R(DD!1,Y1~P!2,Y2~P!3).R(DD!1,Y1~P!4,Y2~P!5).S(CSH2!5,NSH2~O,PTP~O!2).S(CSH2!3,NSH2~O,PTP~O!4)";
  species S147 in cell = 0; S147 is "R(DD!1,Y1~P!2,Y2~P!3).R(DD!1,Y1~P!4,Y2~P!5).S(CSH2!3,NSH2~O,PTP~O!4).S(CSH2,NSH2~O!5,PTP~O!2)";
  species S148 in cell = 0; S148 is "R(DD!1,Y1~P!2,Y2~P!3).R(DD!1,Y1~P!4,Y2~P!5).S(CSH2,NSH2~O!5,PTP~O!2).S(CSH2,NSH2~O!3,PTP~O!4)";
  species S149 in cell = 0; S149 is "R(DD!1,Y1~P!2,Y2~P!3).R(DD!1,Y1~P!4,Y2~P!5).S(CSH2,NSH2~O!3,PTP~O!2).S(CSH2,NSH2~O!5,PTP~O!4)";

  // Parameters:
  kdim = 3;
  kopen = 1;
  kclose = 2.69;
  kon_CSH2 = 0;
  koff_CSH2 = 0;
  kon_NSH2 = 0;
  koff_NSH2 = 0;
  kkin_Y1 = -1;
  kon_PTP = 0;
  koff_PTP = 1;
  kcat_PTP = 0;
  chi_r1 = 3;
  chi_r2 = 2;
  chi_r3 = 3;
  chi_r4 = 2;
  chi_r5 = 2;
  chi_r6 = 2;
  chi_r7 = 2;
  chi_r8 = 3;
  chi_r9 = 2;
  chi_r10 = 2;
  chi_r11 = 3;
  R_dim = -1.6021;
  S_tot = -1.301;
  dummy = 0;
  _rateLaw1 = 10^kkin_Y1;
  _rateLaw2 = 10^kopen;
  _rateLaw3 = 10^kclose;
  _rateLaw4 = 10^kon_CSH2;
  _rateLaw5 = 10^koff_CSH2;
  _rateLaw6 = 10^kon_NSH2;
  _rateLaw7 = 10^koff_NSH2;
  _rateLaw8 = 10^kon_PTP;
  _rateLaw9 = 10^koff_PTP;
  _rateLaw10 = 10^kcat_PTP;
  _rateLaw11 = 10^kcat_PTP;
  _rateLaw12 = 10^chi_r1*10^kon_NSH2;
  _rateLaw13 = 10^koff_NSH2;
  _rateLaw14 = 10^chi_r2*10^kon_PTP;
  _rateLaw15 = 10^koff_PTP;
  _rateLaw16 = 10^chi_r3*10^kon_PTP;
  _rateLaw17 = 10^koff_PTP;
  _rateLaw18 = 10^chi_r1*10^kon_CSH2;
  _rateLaw19 = 10^koff_CSH2;
  _rateLaw20 = 10^chi_r4*10^kon_PTP;
  _rateLaw21 = 10^koff_PTP;
  _rateLaw22 = 10^chi_r5*10^kon_PTP;
  _rateLaw23 = 10^koff_PTP;
  _rateLaw24 = 10^chi_r2*10^kon_CSH2;
  _rateLaw25 = 10^koff_CSH2;
  _rateLaw26 = 10^chi_r3*10^kon_CSH2;
  _rateLaw27 = 10^koff_CSH2;
  _rateLaw28 = 10^chi_r4*10^kon_NSH2;
  _rateLaw29 = 10^koff_NSH2;
  _rateLaw30 = 10^chi_r5*10^kon_NSH2;
  _rateLaw31 = 10^koff_NSH2;
  _rateLaw32 = 10^chi_r6*10^kon_PTP;
  _rateLaw33 = 10^koff_PTP;
  _rateLaw34 = 10^chi_r7*10^kon_PTP;
  _rateLaw35 = 10^koff_PTP;
  _rateLaw36 = 10^chi_r8*10^kon_NSH2;
  _rateLaw37 = 10^koff_NSH2;
  _rateLaw38 = 10^chi_r9*10^kon_NSH2;
  _rateLaw39 = 10^koff_NSH2;
  _rateLaw40 = 10^chi_r10*10^kon_CSH2;
  _rateLaw41 = 10^koff_CSH2;
  _rateLaw42 = 10^chi_r11*10^kon_CSH2;
  _rateLaw43 = 10^koff_CSH2;

  // Assignment rules:
  pYR := S3 + 2*S6 + S7 + S8 + S10 + S11 + S15 + S16 + S18 + 2*S19 + 2*S20 + S21 + S22 + S23 + 2*S24 + S25 + S26 + 2*S27 + S30 + S31 + S32 + S33 + S34 + S35 + S36 + S38 + S39 + S40 + S42 + S43 + S44 + S45 + S46 + S47 + 2*S48 + 2*S49 + 2*S50 + 2*S51 + 2*S52 + 2*S53 + 2*S54 + 2*S55 + 2*S56 + 2*S57 + 2*S58 + 2*S59 + 2*S60 + 2*S61 + 2*S62 + 2*S63 + 2*S64 + S65 + S66 + S67 + S68 + S69 + S70 + S71 + S72 + S73 + S74 + S75 + S76 + S77 + S78 + S79 + S80 + S81 + S82 + S83 + S84 + S85 + 2*S86 + S87 + S88 + S89 + S90 + 2*S91 + 2*S92 + 2*S93 + 2*S94 + 2*S95 + 2*S96 + 2*S97 + 2*S98 + 2*S99 + 2*S100 + 2*S101 + 2*S102 + 2*S103 + 2*S104 + 2*S105 + 2*S106 + 2*S107 + 2*S108 + 2*S109 + 2*S110 + 2*S111 + 2*S112 + 2*S113 + 2*S114 + 2*S115 + 2*S116 + 2*S117 + 2*S118 + 2*S119 + 2*S120 + 2*S121 + 2*S122 + 2*S123 + 2*S124 + 2*S125 + 2*S126 + 2*S127 + 2*S128 + 2*S129 + 2*S130 + 2*S131 + 2*S132 + 2*S133 + 2*S134 + 2*S135 + 2*S136 + 2*S137 + 2*S138 + 2*S139 + 2*S140 + 2*S141 + 2*S142 + 2*S143 + 2*S144 + 2*S145 + 2*S146 + 2*S147 + 2*S148 + 2*S149;

  // Reactions:
  R1: S2 => S3; 2*_rateLaw1*S2;
  R2: S_CSH2_NSH2_C_PTP_C => S_CSH2_NSH2_O_PTP_O; _rateLaw2*S_CSH2_NSH2_C_PTP_C;
  R3: S_CSH2_NSH2_C_PTP_C + S2 => S5; 2*_rateLaw4*S_CSH2_NSH2_C_PTP_C*S2;
  R4: S3 => S6; _rateLaw1*S3;
  R5: S5 => S7; _rateLaw1*S5;
  R6: S5 => S8; _rateLaw1*S5;
  R7: S5 => S9; _rateLaw2*S5;
  R8: S_CSH2_NSH2_O_PTP_O => S_CSH2_NSH2_C_PTP_C; _rateLaw3*S_CSH2_NSH2_O_PTP_O;
  R9: S2 + S_CSH2_NSH2_O_PTP_O => S9; 2*_rateLaw4*S2*S_CSH2_NSH2_O_PTP_O;
  R10: S_CSH2_NSH2_C_PTP_C + S3 => S7; _rateLaw4*S_CSH2_NSH2_C_PTP_C*S3;
  R11: S3 + S_CSH2_NSH2_O_PTP_O => S10; _rateLaw4*S3*S_CSH2_NSH2_O_PTP_O;
  R12: S_CSH2_NSH2_C_PTP_C + S3 => S8; _rateLaw4*S_CSH2_NSH2_C_PTP_C*S3;
  R13: S3 + S_CSH2_NSH2_O_PTP_O => S11; _rateLaw4*S3*S_CSH2_NSH2_O_PTP_O;
  R14: S_CSH2_NSH2_C_PTP_C + S5 => S12; _rateLaw4*S_CSH2_NSH2_C_PTP_C*S5;
  R15: S_CSH2_NSH2_O_PTP_O + S5 => S13; _rateLaw4*S_CSH2_NSH2_O_PTP_O*S5;
  R16: S5 => S_CSH2_NSH2_C_PTP_C + S2; _rateLaw5*S5;
  R17: S2 + S_CSH2_NSH2_O_PTP_O => S14; 2*_rateLaw6*S2*S_CSH2_NSH2_O_PTP_O;
  R18: S3 + S_CSH2_NSH2_O_PTP_O => S15; _rateLaw6*S3*S_CSH2_NSH2_O_PTP_O;
  R19: S3 + S_CSH2_NSH2_O_PTP_O => S16; _rateLaw6*S3*S_CSH2_NSH2_O_PTP_O;
  R20: S_CSH2_NSH2_O_PTP_O + S5 => S17; _rateLaw6*S_CSH2_NSH2_O_PTP_O*S5;
  R21: S3 + S_CSH2_NSH2_O_PTP_O => S18; _rateLaw8*S3*S_CSH2_NSH2_O_PTP_O;
  R22: S7 => S19; _rateLaw1*S7;
  R23: S8 => S19; _rateLaw1*S8;
  R24: S9 => S10; _rateLaw1*S9;
  R25: S9 => S11; _rateLaw1*S9;
  R26: S10 => S20; _rateLaw1*S10;
  R27: S11 => S20; _rateLaw1*S11;
  R28: S12 => S21; 2*_rateLaw1*S12;
  R29: S13 => S22; _rateLaw1*S13;
  R30: S13 => S23; _rateLaw1*S13;
  R31: S14 => S15; _rateLaw1*S14;
  R32: S14 => S16; _rateLaw1*S14;
  R33: S15 => S24; _rateLaw1*S15;
  R34: S16 => S24; _rateLaw1*S16;
  R35: S17 => S25; _rateLaw1*S17;
  R36: S17 => S26; _rateLaw1*S17;
  R37: S18 => S27; _rateLaw1*S18;
  R38: S7 => S10; _rateLaw2*S7;
  R39: S8 => S11; _rateLaw2*S8;
  R40: S12 => S13; 2*_rateLaw2*S12;
  R41: S13 => S28; _rateLaw2*S13;
  R42: S17 => S29; _rateLaw2*S17;
  R43: S9 => S5; _rateLaw3*S9;
  R44: S10 => S7; _rateLaw3*S10;
  R45: S11 => S8; _rateLaw3*S11;
  R46: S13 => S12; _rateLaw3*S13;
  R47: S_CSH2_NSH2_C_PTP_C + S6 => S19; 2*_rateLaw4*S_CSH2_NSH2_C_PTP_C*S6;
  R48: S_CSH2_NSH2_O_PTP_O + S6 => S20; 2*_rateLaw4*S_CSH2_NSH2_O_PTP_O*S6;
  R49: S_CSH2_NSH2_C_PTP_C + S7 => S21; _rateLaw4*S_CSH2_NSH2_C_PTP_C*S7;
  R50: S_CSH2_NSH2_O_PTP_O + S7 => S22; _rateLaw4*S_CSH2_NSH2_O_PTP_O*S7;
  R51: S_CSH2_NSH2_C_PTP_C + S8 => S21; _rateLaw4*S_CSH2_NSH2_C_PTP_C*S8;
  R52: S_CSH2_NSH2_O_PTP_O + S8 => S23; _rateLaw4*S_CSH2_NSH2_O_PTP_O*S8;
  R53: S_CSH2_NSH2_C_PTP_C + S9 => S13; _rateLaw4*S_CSH2_NSH2_C_PTP_C*S9;
  R54: S_CSH2_NSH2_O_PTP_O + S9 => S28; _rateLaw4*S_CSH2_NSH2_O_PTP_O*S9;
  R55: S_CSH2_NSH2_C_PTP_C + S10 => S23; _rateLaw4*S_CSH2_NSH2_C_PTP_C*S10;
  R56: S_CSH2_NSH2_O_PTP_O + S10 => S30; _rateLaw4*S_CSH2_NSH2_O_PTP_O*S10;
  R57: S_CSH2_NSH2_C_PTP_C + S11 => S22; _rateLaw4*S_CSH2_NSH2_C_PTP_C*S11;
  R58: S_CSH2_NSH2_O_PTP_O + S11 => S30; _rateLaw4*S_CSH2_NSH2_O_PTP_O*S11;
  R59: S_CSH2_NSH2_C_PTP_C + S14 => S17; _rateLaw4*S_CSH2_NSH2_C_PTP_C*S14;
  R60: S_CSH2_NSH2_O_PTP_O + S14 => S29; _rateLaw4*S_CSH2_NSH2_O_PTP_O*S14;
  R61: S_CSH2_NSH2_C_PTP_C + S15 => S26; _rateLaw4*S_CSH2_NSH2_C_PTP_C*S15;
  R62: S_CSH2_NSH2_O_PTP_O + S15 => S31; _rateLaw4*S_CSH2_NSH2_O_PTP_O*S15;
  R63: S_CSH2_NSH2_C_PTP_C + S16 => S25; _rateLaw4*S_CSH2_NSH2_C_PTP_C*S16;
  R64: S_CSH2_NSH2_O_PTP_O + S16 => S32; _rateLaw4*S_CSH2_NSH2_O_PTP_O*S16;
  R65: S_CSH2_NSH2_C_PTP_C + S18 => S33; _rateLaw4*S_CSH2_NSH2_C_PTP_C*S18;
  R66: S_CSH2_NSH2_O_PTP_O + S18 => S34; _rateLaw4*S_CSH2_NSH2_O_PTP_O*S18;
  R67: S_CSH2_NSH2_C_PTP_C + S18 => S35; _rateLaw4*S_CSH2_NSH2_C_PTP_C*S18;
  R68: S_CSH2_NSH2_O_PTP_O + S18 => S36; _rateLaw4*S_CSH2_NSH2_O_PTP_O*S18;
  R69: S7 => S_CSH2_NSH2_C_PTP_C + S3; _rateLaw5*S7;
  R70: S8 => S_CSH2_NSH2_C_PTP_C + S3; _rateLaw5*S8;
  R71: S9 => S2 + S_CSH2_NSH2_O_PTP_O; _rateLaw5*S9;
  R72: S10 => S3 + S_CSH2_NSH2_O_PTP_O; _rateLaw5*S10;
  R73: S11 => S3 + S_CSH2_NSH2_O_PTP_O; _rateLaw5*S11;
  R74: S12 => S_CSH2_NSH2_C_PTP_C + S5; 2*_rateLaw5*S12;
  R75: S13 => S_CSH2_NSH2_C_PTP_C + S9; _rateLaw5*S13;
  R76: S13 => S_CSH2_NSH2_O_PTP_O + S5; _rateLaw5*S13;
  R77: S17 => S_CSH2_NSH2_C_PTP_C + S14; _rateLaw5*S17;
  R78: S_CSH2_NSH2_O_PTP_O + S6 => S24; 2*_rateLaw6*S_CSH2_NSH2_O_PTP_O*S6;
  R79: S_CSH2_NSH2_O_PTP_O + S7 => S25; _rateLaw6*S_CSH2_NSH2_O_PTP_O*S7;
  R80: S_CSH2_NSH2_O_PTP_O + S8 => S26; _rateLaw6*S_CSH2_NSH2_O_PTP_O*S8;
  R81: S_CSH2_NSH2_O_PTP_O + S9 => S29; _rateLaw6*S_CSH2_NSH2_O_PTP_O*S9;
  R82: S_CSH2_NSH2_O_PTP_O + S10 => S32; _rateLaw6*S_CSH2_NSH2_O_PTP_O*S10;
  R83: S_CSH2_NSH2_O_PTP_O + S11 => S31; _rateLaw6*S_CSH2_NSH2_O_PTP_O*S11;
  R84: S_CSH2_NSH2_O_PTP_O + S14 => S37; _rateLaw6*S_CSH2_NSH2_O_PTP_O*S14;
  R85: S_CSH2_NSH2_O_PTP_O + S15 => S38; _rateLaw6*S_CSH2_NSH2_O_PTP_O*S15;
  R86: S_CSH2_NSH2_O_PTP_O + S16 => S38; _rateLaw6*S_CSH2_NSH2_O_PTP_O*S16;
  R87: S_CSH2_NSH2_O_PTP_O + S18 => S39; _rateLaw6*S_CSH2_NSH2_O_PTP_O*S18;
  R88: S_CSH2_NSH2_O_PTP_O + S18 => S40; _rateLaw6*S_CSH2_NSH2_O_PTP_O*S18;
  R89: S14 => S2 + S_CSH2_NSH2_O_PTP_O; _rateLaw7*S14;
  R90: S15 => S3 + S_CSH2_NSH2_O_PTP_O; _rateLaw7*S15;
  R91: S16 => S3 + S_CSH2_NSH2_O_PTP_O; _rateLaw7*S16;
  R92: S17 => S_CSH2_NSH2_O_PTP_O + S5; _rateLaw7*S17;
  R93: S_CSH2_NSH2_O_PTP_O + S6 => S27; 2*_rateLaw8*S_CSH2_NSH2_O_PTP_O*S6;
  R94: S_CSH2_NSH2_O_PTP_O + S7 => S33; _rateLaw8*S_CSH2_NSH2_O_PTP_O*S7;
  R95: S_CSH2_NSH2_O_PTP_O + S8 => S35; _rateLaw8*S_CSH2_NSH2_O_PTP_O*S8;
  R96: S_CSH2_NSH2_O_PTP_O + S10 => S34; _rateLaw8*S_CSH2_NSH2_O_PTP_O*S10;
  R97: S_CSH2_NSH2_O_PTP_O + S11 => S36; _rateLaw8*S_CSH2_NSH2_O_PTP_O*S11;
  R98: S_CSH2_NSH2_O_PTP_O + S15 => S39; _rateLaw8*S_CSH2_NSH2_O_PTP_O*S15;
  R99: S_CSH2_NSH2_O_PTP_O + S16 => S40; _rateLaw8*S_CSH2_NSH2_O_PTP_O*S16;
  R100: S18 => S3 + S_CSH2_NSH2_O_PTP_O; _rateLaw9*S18;
  R101: S18 => S2 + S_CSH2_NSH2_O_PTP_O; _rateLaw10*S18;
  R102: S9 => S41; _rateLaw12*S9;
  R103: S10 => S42; _rateLaw12*S10;
  R104: S11 => S43; _rateLaw12*S11;
  R105: S10 => S44; _rateLaw14*S10;
  R106: S11 => S45; _rateLaw16*S11;
  R107: S14 => S41; _rateLaw18*S14;
  R108: S15 => S43; _rateLaw18*S15;
  R109: S16 => S42; _rateLaw18*S16;
  R110: S16 => S46; _rateLaw20*S16;
  R111: S15 => S47; _rateLaw22*S15;
  R112: S18 => S44; _rateLaw24*S18;
  R113: S18 => S45; _rateLaw26*S18;
  R114: S18 => S46; _rateLaw28*S18;
  R115: S18 => S47; _rateLaw30*S18;
  R116: S21 => S48; _rateLaw1*S21;
  R117: S22 => S49; _rateLaw1*S22;
  R118: S23 => S49; _rateLaw1*S23;
  R119: S25 => S50; _rateLaw1*S25;
  R120: S26 => S50; _rateLaw1*S26;
  R121: S28 => S30; 2*_rateLaw1*S28;
  R122: S29 => S32; _rateLaw1*S29;
  R123: S29 => S31; _rateLaw1*S29;
  R124: S30 => S51; _rateLaw1*S30;
  R125: S31 => S52; _rateLaw1*S31;
  R126: S32 => S52; _rateLaw1*S32;
  R127: S33 => S53; _rateLaw1*S33;
  R128: S34 => S54; _rateLaw1*S34;
  R129: S35 => S55; _rateLaw1*S35;
  R130: S36 => S56; _rateLaw1*S36;
  R131: S37 => S38; 2*_rateLaw1*S37;
  R132: S38 => S57; _rateLaw1*S38;
  R133: S39 => S58; _rateLaw1*S39;
  R134: S40 => S59; _rateLaw1*S40;
  R135: S41 => S42; _rateLaw1*S41;
  R136: S41 => S43; _rateLaw1*S41;
  R137: S42 => S60; _rateLaw1*S42;
  R138: S43 => S60; _rateLaw1*S43;
  R139: S44 => S61; _rateLaw1*S44;
  R140: S45 => S62; _rateLaw1*S45;
  R141: S46 => S63; _rateLaw1*S46;
  R142: S47 => S64; _rateLaw1*S47;
  R143: S19 => S20; _rateLaw2*S19;
  R144: S21 => S23; _rateLaw2*S21;
  R145: S21 => S22; _rateLaw2*S21;
  R146: S22 => S30; _rateLaw2*S22;
  R147: S23 => S30; _rateLaw2*S23;
  R148: S25 => S32; _rateLaw2*S25;
  R149: S26 => S31; _rateLaw2*S26;
  R150: S33 => S34; _rateLaw2*S33;
  R151: S35 => S36; _rateLaw2*S35;
  R152: S20 => S19; _rateLaw3*S20;
  R153: S22 => S21; _rateLaw3*S22;
  R154: S23 => S21; _rateLaw3*S23;
  R155: S28 => S13; 2*_rateLaw3*S28;
  R156: S29 => S17; _rateLaw3*S29;
  R157: S30 => S22; _rateLaw3*S30;
  R158: S30 => S23; _rateLaw3*S30;
  R159: S31 => S26; _rateLaw3*S31;
  R160: S32 => S25; _rateLaw3*S32;
  R161: S34 => S33; _rateLaw3*S34;
  R162: S36 => S35; _rateLaw3*S36;
  R163: S_CSH2_NSH2_C_PTP_C + S19 => S48; _rateLaw4*S_CSH2_NSH2_C_PTP_C*S19;
  R164: S_CSH2_NSH2_O_PTP_O + S19 => S49; _rateLaw4*S_CSH2_NSH2_O_PTP_O*S19;
  R165: S_CSH2_NSH2_C_PTP_C + S20 => S49; _rateLaw4*S_CSH2_NSH2_C_PTP_C*S20;
  R166: S_CSH2_NSH2_O_PTP_O + S20 => S51; _rateLaw4*S_CSH2_NSH2_O_PTP_O*S20;
  R167: S_CSH2_NSH2_C_PTP_C + S24 => S50; _rateLaw4*S_CSH2_NSH2_C_PTP_C*S24;
  R168: S_CSH2_NSH2_O_PTP_O + S24 => S52; _rateLaw4*S_CSH2_NSH2_O_PTP_O*S24;
  R169: S_CSH2_NSH2_C_PTP_C + S27 => S53; _rateLaw4*S_CSH2_NSH2_C_PTP_C*S27;
  R170: S_CSH2_NSH2_O_PTP_O + S27 => S54; _rateLaw4*S_CSH2_NSH2_O_PTP_O*S27;
  R171: S_CSH2_NSH2_C_PTP_C + S27 => S55; _rateLaw4*S_CSH2_NSH2_C_PTP_C*S27;
  R172: S_CSH2_NSH2_O_PTP_O + S27 => S56; _rateLaw4*S_CSH2_NSH2_O_PTP_O*S27;
  R173: S_CSH2_NSH2_C_PTP_C + S33 => S65; _rateLaw4*S_CSH2_NSH2_C_PTP_C*S33;
  R174: S_CSH2_NSH2_O_PTP_O + S33 => S66; _rateLaw4*S_CSH2_NSH2_O_PTP_O*S33;
  R175: S_CSH2_NSH2_C_PTP_C + S34 => S67; _rateLaw4*S_CSH2_NSH2_C_PTP_C*S34;
  R176: S_CSH2_NSH2_O_PTP_O + S34 => S68; _rateLaw4*S_CSH2_NSH2_O_PTP_O*S34;
  R177: S_CSH2_NSH2_C_PTP_C + S35 => S65; _rateLaw4*S_CSH2_NSH2_C_PTP_C*S35;
  R178: S_CSH2_NSH2_O_PTP_O + S35 => S67; _rateLaw4*S_CSH2_NSH2_O_PTP_O*S35;
  R179: S_CSH2_NSH2_C_PTP_C + S36 => S66; _rateLaw4*S_CSH2_NSH2_C_PTP_C*S36;
  R180: S_CSH2_NSH2_O_PTP_O + S36 => S68; _rateLaw4*S_CSH2_NSH2_O_PTP_O*S36;
  R181: S_CSH2_NSH2_C_PTP_C + S39 => S69; _rateLaw4*S_CSH2_NSH2_C_PTP_C*S39;
  R182: S_CSH2_NSH2_O_PTP_O + S39 => S70; _rateLaw4*S_CSH2_NSH2_O_PTP_O*S39;
  R183: S_CSH2_NSH2_C_PTP_C + S40 => S71; _rateLaw4*S_CSH2_NSH2_C_PTP_C*S40;
  R184: S_CSH2_NSH2_O_PTP_O + S40 => S72; _rateLaw4*S_CSH2_NSH2_O_PTP_O*S40;
  R185: S_CSH2_NSH2_C_PTP_C + S44 => S73; _rateLaw4*S_CSH2_NSH2_C_PTP_C*S44;
  R186: S_CSH2_NSH2_O_PTP_O + S44 => S74; _rateLaw4*S_CSH2_NSH2_O_PTP_O*S44;
  R187: S_CSH2_NSH2_C_PTP_C + S45 => S75; _rateLaw4*S_CSH2_NSH2_C_PTP_C*S45;
  R188: S_CSH2_NSH2_O_PTP_O + S45 => S76; _rateLaw4*S_CSH2_NSH2_O_PTP_O*S45;
  R189: S_CSH2_NSH2_C_PTP_C + S46 => S77; _rateLaw4*S_CSH2_NSH2_C_PTP_C*S46;
  R190: S_CSH2_NSH2_O_PTP_O + S46 => S78; _rateLaw4*S_CSH2_NSH2_O_PTP_O*S46;
  R191: S_CSH2_NSH2_C_PTP_C + S47 => S79; _rateLaw4*S_CSH2_NSH2_C_PTP_C*S47;
  R192: S_CSH2_NSH2_O_PTP_O + S47 => S80; _rateLaw4*S_CSH2_NSH2_O_PTP_O*S47;
  R193: S19 => S_CSH2_NSH2_C_PTP_C + S6; _rateLaw5*S19;
  R194: S20 => S_CSH2_NSH2_O_PTP_O + S6; _rateLaw5*S20;
  R195: S21 => S_CSH2_NSH2_C_PTP_C + S8; _rateLaw5*S21;
  R196: S21 => S_CSH2_NSH2_C_PTP_C + S7; _rateLaw5*S21;
  R197: S22 => S_CSH2_NSH2_C_PTP_C + S11; _rateLaw5*S22;
  R198: S22 => S_CSH2_NSH2_O_PTP_O + S7; _rateLaw5*S22;
  R199: S23 => S_CSH2_NSH2_O_PTP_O + S8; _rateLaw5*S23;
  R200: S23 => S_CSH2_NSH2_C_PTP_C + S10; _rateLaw5*S23;
  R201: S25 => S_CSH2_NSH2_C_PTP_C + S16; _rateLaw5*S25;
  R202: S26 => S_CSH2_NSH2_C_PTP_C + S15; _rateLaw5*S26;
  R203: S28 => S_CSH2_NSH2_O_PTP_O + S9; 2*_rateLaw5*S28;
  R204: S29 => S_CSH2_NSH2_O_PTP_O + S14; _rateLaw5*S29;
  R205: S30 => S_CSH2_NSH2_O_PTP_O + S11; _rateLaw5*S30;
  R206: S30 => S_CSH2_NSH2_O_PTP_O + S10; _rateLaw5*S30;
  R207: S31 => S_CSH2_NSH2_O_PTP_O + S15; _rateLaw5*S31;
  R208: S32 => S_CSH2_NSH2_O_PTP_O + S16; _rateLaw5*S32;
  R209: S33 => S_CSH2_NSH2_C_PTP_C + S18; _rateLaw5*S33;
  R210: S34 => S_CSH2_NSH2_O_PTP_O + S18; _rateLaw5*S34;
  R211: S35 => S_CSH2_NSH2_C_PTP_C + S18; _rateLaw5*S35;
  R212: S36 => S_CSH2_NSH2_O_PTP_O + S18; _rateLaw5*S36;
  R213: S_CSH2_NSH2_O_PTP_O + S19 => S50; _rateLaw6*S_CSH2_NSH2_O_PTP_O*S19;
  R214: S_CSH2_NSH2_O_PTP_O + S20 => S52; _rateLaw6*S_CSH2_NSH2_O_PTP_O*S20;
  R215: S_CSH2_NSH2_O_PTP_O + S24 => S57; _rateLaw6*S_CSH2_NSH2_O_PTP_O*S24;
  R216: S_CSH2_NSH2_O_PTP_O + S27 => S58; _rateLaw6*S_CSH2_NSH2_O_PTP_O*S27;
  R217: S_CSH2_NSH2_O_PTP_O + S27 => S59; _rateLaw6*S_CSH2_NSH2_O_PTP_O*S27;
  R218: S_CSH2_NSH2_O_PTP_O + S33 => S71; _rateLaw6*S_CSH2_NSH2_O_PTP_O*S33;
  R219: S_CSH2_NSH2_O_PTP_O + S34 => S72; _rateLaw6*S_CSH2_NSH2_O_PTP_O*S34;
  R220: S_CSH2_NSH2_O_PTP_O + S35 => S69; _rateLaw6*S_CSH2_NSH2_O_PTP_O*S35;
  R221: S_CSH2_NSH2_O_PTP_O + S36 => S70; _rateLaw6*S_CSH2_NSH2_O_PTP_O*S36;
  R222: S_CSH2_NSH2_O_PTP_O + S39 => S81; _rateLaw6*S_CSH2_NSH2_O_PTP_O*S39;
  R223: S_CSH2_NSH2_O_PTP_O + S40 => S81; _rateLaw6*S_CSH2_NSH2_O_PTP_O*S40;
  R224: S_CSH2_NSH2_O_PTP_O + S44 => S82; _rateLaw6*S_CSH2_NSH2_O_PTP_O*S44;
  R225: S_CSH2_NSH2_O_PTP_O + S45 => S83; _rateLaw6*S_CSH2_NSH2_O_PTP_O*S45;
  R226: S_CSH2_NSH2_O_PTP_O + S46 => S84; _rateLaw6*S_CSH2_NSH2_O_PTP_O*S46;
  R227: S_CSH2_NSH2_O_PTP_O + S47 => S85; _rateLaw6*S_CSH2_NSH2_O_PTP_O*S47;
  R228: S24 => S_CSH2_NSH2_O_PTP_O + S6; _rateLaw7*S24;
  R229: S25 => S_CSH2_NSH2_O_PTP_O + S7; _rateLaw7*S25;
  R230: S26 => S_CSH2_NSH2_O_PTP_O + S8; _rateLaw7*S26;
  R231: S29 => S_CSH2_NSH2_O_PTP_O + S9; _rateLaw7*S29;
  R232: S31 => S_CSH2_NSH2_O_PTP_O + S11; _rateLaw7*S31;
  R233: S32 => S_CSH2_NSH2_O_PTP_O + S10; _rateLaw7*S32;
  R234: S37 => S_CSH2_NSH2_O_PTP_O + S14; 2*_rateLaw7*S37;
  R235: S38 => S_CSH2_NSH2_O_PTP_O + S16; _rateLaw7*S38;
  R236: S38 => S_CSH2_NSH2_O_PTP_O + S15; _rateLaw7*S38;
  R237: S39 => S_CSH2_NSH2_O_PTP_O + S18; _rateLaw7*S39;
  R238: S40 => S_CSH2_NSH2_O_PTP_O + S18; _rateLaw7*S40;
  R239: S_CSH2_NSH2_O_PTP_O + S19 => S53; _rateLaw8*S_CSH2_NSH2_O_PTP_O*S19;
  R240: S_CSH2_NSH2_O_PTP_O + S19 => S55; _rateLaw8*S_CSH2_NSH2_O_PTP_O*S19;
  R241: S_CSH2_NSH2_O_PTP_O + S20 => S54; _rateLaw8*S_CSH2_NSH2_O_PTP_O*S20;
  R242: S_CSH2_NSH2_O_PTP_O + S20 => S56; _rateLaw8*S_CSH2_NSH2_O_PTP_O*S20;
  R243: S_CSH2_NSH2_O_PTP_O + S21 => S65; _rateLaw8*S_CSH2_NSH2_O_PTP_O*S21;
  R244: S_CSH2_NSH2_O_PTP_O + S22 => S66; _rateLaw8*S_CSH2_NSH2_O_PTP_O*S22;
  R245: S_CSH2_NSH2_O_PTP_O + S23 => S67; _rateLaw8*S_CSH2_NSH2_O_PTP_O*S23;
  R246: S_CSH2_NSH2_O_PTP_O + S24 => S58; _rateLaw8*S_CSH2_NSH2_O_PTP_O*S24;
  R247: S_CSH2_NSH2_O_PTP_O + S24 => S59; _rateLaw8*S_CSH2_NSH2_O_PTP_O*S24;
  R248: S_CSH2_NSH2_O_PTP_O + S25 => S71; _rateLaw8*S_CSH2_NSH2_O_PTP_O*S25;
  R249: S_CSH2_NSH2_O_PTP_O + S26 => S69; _rateLaw8*S_CSH2_NSH2_O_PTP_O*S26;
  R250: S_CSH2_NSH2_O_PTP_O + S27 => S86; _rateLaw8*S_CSH2_NSH2_O_PTP_O*S27;
  R251: S_CSH2_NSH2_O_PTP_O + S30 => S68; _rateLaw8*S_CSH2_NSH2_O_PTP_O*S30;
  R252: S_CSH2_NSH2_O_PTP_O + S31 => S70; _rateLaw8*S_CSH2_NSH2_O_PTP_O*S31;
  R253: S_CSH2_NSH2_O_PTP_O + S32 => S72; _rateLaw8*S_CSH2_NSH2_O_PTP_O*S32;
  R254: S_CSH2_NSH2_O_PTP_O + S38 => S81; _rateLaw8*S_CSH2_NSH2_O_PTP_O*S38;
  R255: S_CSH2_NSH2_O_PTP_O + S42 => S87; _rateLaw8*S_CSH2_NSH2_O_PTP_O*S42;
  R256: S_CSH2_NSH2_O_PTP_O + S43 => S88; _rateLaw8*S_CSH2_NSH2_O_PTP_O*S43;
  R257: S27 => S_CSH2_NSH2_O_PTP_O + S6; _rateLaw9*S27;
  R258: S33 => S_CSH2_NSH2_O_PTP_O + S7; _rateLaw9*S33;
  R259: S34 => S_CSH2_NSH2_O_PTP_O + S10; _rateLaw9*S34;
  R260: S35 => S_CSH2_NSH2_O_PTP_O + S8; _rateLaw9*S35;
  R261: S36 => S_CSH2_NSH2_O_PTP_O + S11; _rateLaw9*S36;
  R262: S39 => S_CSH2_NSH2_O_PTP_O + S15; _rateLaw9*S39;
  R263: S40 => S_CSH2_NSH2_O_PTP_O + S16; _rateLaw9*S40;
  R264: S27 => S3 + S_CSH2_NSH2_O_PTP_O; _rateLaw10*S27;
  R265: S33 => S_CSH2_NSH2_O_PTP_O + S5; _rateLaw10*S33;
  R266: S34 => S_CSH2_NSH2_O_PTP_O + S9; _rateLaw10*S34;
  R267: S35 => S_CSH2_NSH2_O_PTP_O + S5; _rateLaw10*S35;
  R268: S36 => S_CSH2_NSH2_O_PTP_O + S9; _rateLaw10*S36;
  R269: S39 => S_CSH2_NSH2_O_PTP_O + S14; _rateLaw10*S39;
  R270: S40 => S_CSH2_NSH2_O_PTP_O + S14; _rateLaw10*S40;
  R271: S44 => S9; _rateLaw11*S44;
  R272: S45 => S9; _rateLaw11*S45;
  R273: S46 => S14; _rateLaw11*S46;
  R274: S47 => S14; _rateLaw11*S47;
  R275: S20 => S60; _rateLaw12*S20;
  R276: S34 => S87; _rateLaw12*S34;
  R277: S36 => S88; _rateLaw12*S36;
  R278: S41 => S9; _rateLaw13*S41;
  R279: S42 => S10; _rateLaw13*S42;
  R280: S43 => S11; _rateLaw13*S43;
  R281: S20 => S61; _rateLaw14*S20;
  R282: S23 => S73; _rateLaw14*S23;
  R283: S30 => S74; _rateLaw14*S30;
  R284: S32 => S82; _rateLaw14*S32;
  R285: S44 => S10; _rateLaw15*S44;
  R286: S20 => S62; _rateLaw16*S20;
  R287: S22 => S75; _rateLaw16*S22;
  R288: S30 => S76; _rateLaw16*S30;
  R289: S31 => S83; _rateLaw16*S31;
  R290: S45 => S11; _rateLaw17*S45;
  R291: S24 => S60; _rateLaw18*S24;
  R292: S39 => S88; _rateLaw18*S39;
  R293: S40 => S87; _rateLaw18*S40;
  R294: S41 => S14; _rateLaw19*S41;
  R295: S42 => S16; _rateLaw19*S42;
  R296: S43 => S15; _rateLaw19*S43;
  R297: S24 => S63; _rateLaw20*S24;
  R298: S25 => S77; _rateLaw20*S25;
  R299: S32 => S78; _rateLaw20*S32;
  R300: S38 => S84; _rateLaw20*S38;
  R301: S46 => S16; _rateLaw21*S46;
  R302: S24 => S64; _rateLaw22*S24;
  R303: S26 => S79; _rateLaw22*S26;
  R304: S31 => S80; _rateLaw22*S31;
  R305: S38 => S85; _rateLaw22*S38;
  R306: S47 => S15; _rateLaw23*S47;
  R307: S27 => S61; _rateLaw24*S27;
  R308: S35 => S73; _rateLaw24*S35;
  R309: S36 => S74; _rateLaw24*S36;
  R310: S40 => S82; _rateLaw24*S40;
  R311: S44 => S18; _rateLaw25*S44;
  R312: S27 => S62; _rateLaw26*S27;
  R313: S33 => S75; _rateLaw26*S33;
  R314: S34 => S76; _rateLaw26*S34;
  R315: S39 => S83; _rateLaw26*S39;
  R316: S45 => S18; _rateLaw27*S45;
  R317: S27 => S63; _rateLaw28*S27;
  R318: S33 => S77; _rateLaw28*S33;
  R319: S34 => S78; _rateLaw28*S34;
  R320: S39 => S84; _rateLaw28*S39;
  R321: S46 => S18; _rateLaw29*S46;
  R322: S27 => S64; _rateLaw30*S27;
  R323: S35 => S79; _rateLaw30*S35;
  R324: S36 => S80; _rateLaw30*S36;
  R325: S40 => S85; _rateLaw30*S40;
  R326: S47 => S18; _rateLaw31*S47;
  R327: S42 => S89; _rateLaw32*S42;
  R328: S43 => S90; _rateLaw34*S43;
  R329: S44 => S89; _rateLaw36*S44;
  R330: S45 => S90; _rateLaw38*S45;
  R331: S46 => S89; _rateLaw40*S46;
  R332: S47 => S90; _rateLaw42*S47;
  R333: S65 => S91; _rateLaw1*S65;
  R334: S66 => S92; _rateLaw1*S66;
  R335: S67 => S93; _rateLaw1*S67;
  R336: S68 => S94; _rateLaw1*S68;
  R337: S69 => S95; _rateLaw1*S69;
  R338: S70 => S96; _rateLaw1*S70;
  R339: S71 => S97; _rateLaw1*S71;
  R340: S72 => S98; _rateLaw1*S72;
  R341: S73 => S99; _rateLaw1*S73;
  R342: S74 => S100; _rateLaw1*S74;
  R343: S75 => S101; _rateLaw1*S75;
  R344: S76 => S102; _rateLaw1*S76;
  R345: S77 => S103; _rateLaw1*S77;
  R346: S78 => S104; _rateLaw1*S78;
  R347: S79 => S105; _rateLaw1*S79;
  R348: S80 => S106; _rateLaw1*S80;
  R349: S81 => S107; _rateLaw1*S81;
  R350: S82 => S108; _rateLaw1*S82;
  R351: S83 => S109; _rateLaw1*S83;
  R352: S84 => S110; _rateLaw1*S84;
  R353: S85 => S111; _rateLaw1*S85;
  R354: S87 => S112; _rateLaw1*S87;
  R355: S88 => S113; _rateLaw1*S88;
  R356: S89 => S114; _rateLaw1*S89;
  R357: S90 => S115; _rateLaw1*S90;
  R358: S48 => S49; 2*_rateLaw2*S48;
  R359: S49 => S51; _rateLaw2*S49;
  R360: S50 => S52; _rateLaw2*S50;
  R361: S53 => S54; _rateLaw2*S53;
  R362: S55 => S56; _rateLaw2*S55;
  R363: S65 => S67; _rateLaw2*S65;
  R364: S65 => S66; _rateLaw2*S65;
  R365: S66 => S68; _rateLaw2*S66;
  R366: S67 => S68; _rateLaw2*S67;
  R367: S69 => S70; _rateLaw2*S69;
  R368: S71 => S72; _rateLaw2*S71;
  R369: S73 => S74; _rateLaw2*S73;
  R370: S75 => S76; _rateLaw2*S75;
  R371: S77 => S78; _rateLaw2*S77;
  R372: S79 => S80; _rateLaw2*S79;
  R373: S49 => S48; _rateLaw3*S49;
  R374: S51 => S49; 2*_rateLaw3*S51;
  R375: S52 => S50; _rateLaw3*S52;
  R376: S54 => S53; _rateLaw3*S54;
  R377: S56 => S55; _rateLaw3*S56;
  R378: S66 => S65; _rateLaw3*S66;
  R379: S67 => S65; _rateLaw3*S67;
  R380: S68 => S66; _rateLaw3*S68;
  R381: S68 => S67; _rateLaw3*S68;
  R382: S70 => S69; _rateLaw3*S70;
  R383: S72 => S71; _rateLaw3*S72;
  R384: S74 => S73; _rateLaw3*S74;
  R385: S76 => S75; _rateLaw3*S76;
  R386: S78 => S77; _rateLaw3*S78;
  R387: S80 => S79; _rateLaw3*S80;
  R388: S_CSH2_NSH2_C_PTP_C + S53 => S91; _rateLaw4*S_CSH2_NSH2_C_PTP_C*S53;
  R389: S_CSH2_NSH2_O_PTP_O + S53 => S92; _rateLaw4*S_CSH2_NSH2_O_PTP_O*S53;
  R390: S_CSH2_NSH2_C_PTP_C + S54 => S93; _rateLaw4*S_CSH2_NSH2_C_PTP_C*S54;
  R391: S_CSH2_NSH2_O_PTP_O + S54 => S94; _rateLaw4*S_CSH2_NSH2_O_PTP_O*S54;
  R392: S_CSH2_NSH2_C_PTP_C + S55 => S91; _rateLaw4*S_CSH2_NSH2_C_PTP_C*S55;
  R393: S_CSH2_NSH2_O_PTP_O + S55 => S93; _rateLaw4*S_CSH2_NSH2_O_PTP_O*S55;
  R394: S_CSH2_NSH2_C_PTP_C + S56 => S92; _rateLaw4*S_CSH2_NSH2_C_PTP_C*S56;
  R395: S_CSH2_NSH2_O_PTP_O + S56 => S94; _rateLaw4*S_CSH2_NSH2_O_PTP_O*S56;
  R396: S_CSH2_NSH2_C_PTP_C + S58 => S95; _rateLaw4*S_CSH2_NSH2_C_PTP_C*S58;
  R397: S_CSH2_NSH2_O_PTP_O + S58 => S96; _rateLaw4*S_CSH2_NSH2_O_PTP_O*S58;
  R398: S_CSH2_NSH2_C_PTP_C + S59 => S97; _rateLaw4*S_CSH2_NSH2_C_PTP_C*S59;
  R399: S_CSH2_NSH2_O_PTP_O + S59 => S98; _rateLaw4*S_CSH2_NSH2_O_PTP_O*S59;
  R400: S_CSH2_NSH2_C_PTP_C + S61 => S99; _rateLaw4*S_CSH2_NSH2_C_PTP_C*S61;
  R401: S_CSH2_NSH2_O_PTP_O + S61 => S100; _rateLaw4*S_CSH2_NSH2_O_PTP_O*S61;
  R402: S_CSH2_NSH2_C_PTP_C + S62 => S101; _rateLaw4*S_CSH2_NSH2_C_PTP_C*S62;
  R403: S_CSH2_NSH2_O_PTP_O + S62 => S102; _rateLaw4*S_CSH2_NSH2_O_PTP_O*S62;
  R404: S_CSH2_NSH2_C_PTP_C + S63 => S103; _rateLaw4*S_CSH2_NSH2_C_PTP_C*S63;
  R405: S_CSH2_NSH2_O_PTP_O + S63 => S104; _rateLaw4*S_CSH2_NSH2_O_PTP_O*S63;
  R406: S_CSH2_NSH2_C_PTP_C + S64 => S105; _rateLaw4*S_CSH2_NSH2_C_PTP_C*S64;
  R407: S_CSH2_NSH2_O_PTP_O + S64 => S106; _rateLaw4*S_CSH2_NSH2_O_PTP_O*S64;
  R408: S_CSH2_NSH2_C_PTP_C + S86 => S116; 2*_rateLaw4*S_CSH2_NSH2_C_PTP_C*S86;
  R409: S_CSH2_NSH2_O_PTP_O + S86 => S117; 2*_rateLaw4*S_CSH2_NSH2_O_PTP_O*S86;
  R410: S48 => S_CSH2_NSH2_C_PTP_C + S19; 2*_rateLaw5*S48;
  R411: S49 => S_CSH2_NSH2_C_PTP_C + S20; _rateLaw5*S49;
  R412: S49 => S_CSH2_NSH2_O_PTP_O + S19; _rateLaw5*S49;
  R413: S50 => S_CSH2_NSH2_C_PTP_C + S24; _rateLaw5*S50;
  R414: S51 => S_CSH2_NSH2_O_PTP_O + S20; 2*_rateLaw5*S51;
  R415: S52 => S_CSH2_NSH2_O_PTP_O + S24; _rateLaw5*S52;
  R416: S53 => S_CSH2_NSH2_C_PTP_C + S27; _rateLaw5*S53;
  R417: S54 => S_CSH2_NSH2_O_PTP_O + S27; _rateLaw5*S54;
  R418: S55 => S_CSH2_NSH2_C_PTP_C + S27; _rateLaw5*S55;
  R419: S56 => S_CSH2_NSH2_O_PTP_O + S27; _rateLaw5*S56;
  R420: S65 => S_CSH2_NSH2_C_PTP_C + S35; _rateLaw5*S65;
  R421: S65 => S_CSH2_NSH2_C_PTP_C + S33; _rateLaw5*S65;
  R422: S66 => S_CSH2_NSH2_C_PTP_C + S36; _rateLaw5*S66;
  R423: S66 => S_CSH2_NSH2_O_PTP_O + S33; _rateLaw5*S66;
  R424: S67 => S_CSH2_NSH2_O_PTP_O + S35; _rateLaw5*S67;
  R425: S67 => S_CSH2_NSH2_C_PTP_C + S34; _rateLaw5*S67;
  R426: S68 => S_CSH2_NSH2_O_PTP_O + S36; _rateLaw5*S68;
  R427: S68 => S_CSH2_NSH2_O_PTP_O + S34; _rateLaw5*S68;
  R428: S69 => S_CSH2_NSH2_C_PTP_C + S39; _rateLaw5*S69;
  R429: S70 => S_CSH2_NSH2_O_PTP_O + S39; _rateLaw5*S70;
  R430: S71 => S_CSH2_NSH2_C_PTP_C + S40; _rateLaw5*S71;
  R431: S72 => S_CSH2_NSH2_O_PTP_O + S40; _rateLaw5*S72;
  R432: S73 => S_CSH2_NSH2_C_PTP_C + S44; _rateLaw5*S73;
  R433: S74 => S_CSH2_NSH2_O_PTP_O + S44; _rateLaw5*S74;
  R434: S75 => S_CSH2_NSH2_C_PTP_C + S45; _rateLaw5*S75;
  R435: S76 => S_CSH2_NSH2_O_PTP_O + S45; _rateLaw5*S76;
  R436: S77 => S_CSH2_NSH2_C_PTP_C + S46; _rateLaw5*S77;
  R437: S78 => S_CSH2_NSH2_O_PTP_O + S46; _rateLaw5*S78;
  R438: S79 => S_CSH2_NSH2_C_PTP_C + S47; _rateLaw5*S79;
  R439: S80 => S_CSH2_NSH2_O_PTP_O + S47; _rateLaw5*S80;
  R440: S_CSH2_NSH2_O_PTP_O + S53 => S97; _rateLaw6*S_CSH2_NSH2_O_PTP_O*S53;
  R441: S_CSH2_NSH2_O_PTP_O + S54 => S98; _rateLaw6*S_CSH2_NSH2_O_PTP_O*S54;
  R442: S_CSH2_NSH2_O_PTP_O + S55 => S95; _rateLaw6*S_CSH2_NSH2_O_PTP_O*S55;
  R443: S_CSH2_NSH2_O_PTP_O + S56 => S96; _rateLaw6*S_CSH2_NSH2_O_PTP_O*S56;
  R444: S_CSH2_NSH2_O_PTP_O + S58 => S107; _rateLaw6*S_CSH2_NSH2_O_PTP_O*S58;
  R445: S_CSH2_NSH2_O_PTP_O + S59 => S107; _rateLaw6*S_CSH2_NSH2_O_PTP_O*S59;
  R446: S_CSH2_NSH2_O_PTP_O + S61 => S108; _rateLaw6*S_CSH2_NSH2_O_PTP_O*S61;
  R447: S_CSH2_NSH2_O_PTP_O + S62 => S109; _rateLaw6*S_CSH2_NSH2_O_PTP_O*S62;
  R448: S_CSH2_NSH2_O_PTP_O + S63 => S110; _rateLaw6*S_CSH2_NSH2_O_PTP_O*S63;
  R449: S_CSH2_NSH2_O_PTP_O + S64 => S111; _rateLaw6*S_CSH2_NSH2_O_PTP_O*S64;
  R450: S_CSH2_NSH2_O_PTP_O + S86 => S118; 2*_rateLaw6*S_CSH2_NSH2_O_PTP_O*S86;
  R451: S50 => S_CSH2_NSH2_O_PTP_O + S19; _rateLaw7*S50;
  R452: S52 => S_CSH2_NSH2_O_PTP_O + S20; _rateLaw7*S52;
  R453: S57 => S_CSH2_NSH2_O_PTP_O + S24; 2*_rateLaw7*S57;
  R454: S58 => S_CSH2_NSH2_O_PTP_O + S27; _rateLaw7*S58;
  R455: S59 => S_CSH2_NSH2_O_PTP_O + S27; _rateLaw7*S59;
  R456: S69 => S_CSH2_NSH2_O_PTP_O + S35; _rateLaw7*S69;
  R457: S70 => S_CSH2_NSH2_O_PTP_O + S36; _rateLaw7*S70;
  R458: S71 => S_CSH2_NSH2_O_PTP_O + S33; _rateLaw7*S71;
  R459: S72 => S_CSH2_NSH2_O_PTP_O + S34; _rateLaw7*S72;
  R460: S81 => S_CSH2_NSH2_O_PTP_O + S40; _rateLaw7*S81;
  R461: S81 => S_CSH2_NSH2_O_PTP_O + S39; _rateLaw7*S81;
  R462: S82 => S_CSH2_NSH2_O_PTP_O + S44; _rateLaw7*S82;
  R463: S83 => S_CSH2_NSH2_O_PTP_O + S45; _rateLaw7*S83;
  R464: S84 => S_CSH2_NSH2_O_PTP_O + S46; _rateLaw7*S84;
  R465: S85 => S_CSH2_NSH2_O_PTP_O + S47; _rateLaw7*S85;
  R466: S_CSH2_NSH2_O_PTP_O + S48 => S91; 2*_rateLaw8*S_CSH2_NSH2_O_PTP_O*S48;
  R467: S_CSH2_NSH2_O_PTP_O + S49 => S92; _rateLaw8*S_CSH2_NSH2_O_PTP_O*S49;
  R468: S_CSH2_NSH2_O_PTP_O + S49 => S93; _rateLaw8*S_CSH2_NSH2_O_PTP_O*S49;
  R469: S_CSH2_NSH2_O_PTP_O + S50 => S97; _rateLaw8*S_CSH2_NSH2_O_PTP_O*S50;
  R470: S_CSH2_NSH2_O_PTP_O + S50 => S95; _rateLaw8*S_CSH2_NSH2_O_PTP_O*S50;
  R471: S_CSH2_NSH2_O_PTP_O + S51 => S94; 2*_rateLaw8*S_CSH2_NSH2_O_PTP_O*S51;
  R472: S_CSH2_NSH2_O_PTP_O + S52 => S96; _rateLaw8*S_CSH2_NSH2_O_PTP_O*S52;
  R473: S_CSH2_NSH2_O_PTP_O + S52 => S98; _rateLaw8*S_CSH2_NSH2_O_PTP_O*S52;
  R474: S_CSH2_NSH2_O_PTP_O + S53 => S116; _rateLaw8*S_CSH2_NSH2_O_PTP_O*S53;
  R475: S_CSH2_NSH2_O_PTP_O + S54 => S117; _rateLaw8*S_CSH2_NSH2_O_PTP_O*S54;
  R476: S_CSH2_NSH2_O_PTP_O + S55 => S116; _rateLaw8*S_CSH2_NSH2_O_PTP_O*S55;
  R477: S_CSH2_NSH2_O_PTP_O + S56 => S117; _rateLaw8*S_CSH2_NSH2_O_PTP_O*S56;
  R478: S_CSH2_NSH2_O_PTP_O + S57 => S107; 2*_rateLaw8*S_CSH2_NSH2_O_PTP_O*S57;
  R479: S_CSH2_NSH2_O_PTP_O + S58 => S118; _rateLaw8*S_CSH2_NSH2_O_PTP_O*S58;
  R480: S_CSH2_NSH2_O_PTP_O + S59 => S118; _rateLaw8*S_CSH2_NSH2_O_PTP_O*S59;
  R481: S_CSH2_NSH2_O_PTP_O + S60 => S112; _rateLaw8*S_CSH2_NSH2_O_PTP_O*S60;
  R482: S_CSH2_NSH2_O_PTP_O + S60 => S113; _rateLaw8*S_CSH2_NSH2_O_PTP_O*S60;
  R483: S_CSH2_NSH2_O_PTP_O + S61 => S119; _rateLaw8*S_CSH2_NSH2_O_PTP_O*S61;
  R484: S_CSH2_NSH2_O_PTP_O + S62 => S120; _rateLaw8*S_CSH2_NSH2_O_PTP_O*S62;
  R485: S_CSH2_NSH2_O_PTP_O + S63 => S121; _rateLaw8*S_CSH2_NSH2_O_PTP_O*S63;
  R486: S_CSH2_NSH2_O_PTP_O + S64 => S122; _rateLaw8*S_CSH2_NSH2_O_PTP_O*S64;
  R487: S53 => S_CSH2_NSH2_O_PTP_O + S19; _rateLaw9*S53;
  R488: S54 => S_CSH2_NSH2_O_PTP_O + S20; _rateLaw9*S54;
  R489: S55 => S_CSH2_NSH2_O_PTP_O + S19; _rateLaw9*S55;
  R490: S56 => S_CSH2_NSH2_O_PTP_O + S20; _rateLaw9*S56;
  R491: S58 => S_CSH2_NSH2_O_PTP_O + S24; _rateLaw9*S58;
  R492: S59 => S_CSH2_NSH2_O_PTP_O + S24; _rateLaw9*S59;
  R493: S65 => S_CSH2_NSH2_O_PTP_O + S21; _rateLaw9*S65;
  R494: S66 => S_CSH2_NSH2_O_PTP_O + S22; _rateLaw9*S66;
  R495: S67 => S_CSH2_NSH2_O_PTP_O + S23; _rateLaw9*S67;
  R496: S68 => S_CSH2_NSH2_O_PTP_O + S30; _rateLaw9*S68;
  R497: S69 => S_CSH2_NSH2_O_PTP_O + S26; _rateLaw9*S69;
  R498: S70 => S_CSH2_NSH2_O_PTP_O + S31; _rateLaw9*S70;
  R499: S71 => S_CSH2_NSH2_O_PTP_O + S25; _rateLaw9*S71;
  R500: S72 => S_CSH2_NSH2_O_PTP_O + S32; _rateLaw9*S72;
  R501: S81 => S_CSH2_NSH2_O_PTP_O + S38; _rateLaw9*S81;
  R502: S86 => S_CSH2_NSH2_O_PTP_O + S27; 2*_rateLaw9*S86;
  R503: S87 => S_CSH2_NSH2_O_PTP_O + S42; _rateLaw9*S87;
  R504: S88 => S_CSH2_NSH2_O_PTP_O + S43; _rateLaw9*S88;
  R505: S53 => S_CSH2_NSH2_O_PTP_O + S8; _rateLaw10*S53;
  R506: S54 => S_CSH2_NSH2_O_PTP_O + S11; _rateLaw10*S54;
  R507: S55 => S_CSH2_NSH2_O_PTP_O + S7; _rateLaw10*S55;
  R508: S56 => S_CSH2_NSH2_O_PTP_O + S10; _rateLaw10*S56;
  R509: S58 => S_CSH2_NSH2_O_PTP_O + S16; _rateLaw10*S58;
  R510: S59 => S_CSH2_NSH2_O_PTP_O + S15; _rateLaw10*S59;
  R511: S65 => S_CSH2_NSH2_O_PTP_O + S12; _rateLaw10*S65;
  R512: S66 => S_CSH2_NSH2_O_PTP_O + S13; _rateLaw10*S66;
  R513: S67 => S_CSH2_NSH2_O_PTP_O + S13; _rateLaw10*S67;
  R514: S68 => S_CSH2_NSH2_O_PTP_O + S28; _rateLaw10*S68;
  R515: S69 => S_CSH2_NSH2_O_PTP_O + S17; _rateLaw10*S69;
  R516: S70 => S_CSH2_NSH2_O_PTP_O + S29; _rateLaw10*S70;
  R517: S71 => S_CSH2_NSH2_O_PTP_O + S17; _rateLaw10*S71;
  R518: S72 => S_CSH2_NSH2_O_PTP_O + S29; _rateLaw10*S72;
  R519: S81 => S_CSH2_NSH2_O_PTP_O + S37; _rateLaw10*S81;
  R520: S86 => S_CSH2_NSH2_O_PTP_O + S18; 2*_rateLaw10*S86;
  R521: S87 => S_CSH2_NSH2_O_PTP_O + S41; _rateLaw10*S87;
  R522: S88 => S_CSH2_NSH2_O_PTP_O + S41; _rateLaw10*S88;
  R523: S61 => S11; _rateLaw11*S61;
  R524: S62 => S10; _rateLaw11*S62;
  R525: S63 => S15; _rateLaw11*S63;
  R526: S64 => S16; _rateLaw11*S64;
  R527: S73 => S13; _rateLaw11*S73;
  R528: S74 => S28; _rateLaw11*S74;
  R529: S75 => S13; _rateLaw11*S75;
  R530: S76 => S28; _rateLaw11*S76;
  R531: S77 => S17; _rateLaw11*S77;
  R532: S78 => S29; _rateLaw11*S78;
  R533: S79 => S17; _rateLaw11*S79;
  R534: S80 => S29; _rateLaw11*S80;
  R535: S82 => S29; _rateLaw11*S82;
  R536: S83 => S29; _rateLaw11*S83;
  R537: S84 => S37; _rateLaw11*S84;
  R538: S85 => S37; _rateLaw11*S85;
  R539: S89 => S41; _rateLaw11*S89;
  R540: S90 => S41; _rateLaw11*S90;
  R541: S54 => S112; _rateLaw12*S54;
  R542: S56 => S113; _rateLaw12*S56;
  R543: S60 => S20; _rateLaw13*S60;
  R544: S87 => S34; _rateLaw13*S87;
  R545: S88 => S36; _rateLaw13*S88;
  R546: S49 => S99; _rateLaw14*S49;
  R547: S51 => S100; 2*_rateLaw14*S51;
  R548: S52 => S108; _rateLaw14*S52;
  R549: S56 => S119; _rateLaw14*S56;
  R550: S61 => S20; _rateLaw15*S61;
  R551: S73 => S23; _rateLaw15*S73;
  R552: S74 => S30; _rateLaw15*S74;
  R553: S82 => S32; _rateLaw15*S82;
  R554: S49 => S101; _rateLaw16*S49;
  R555: S51 => S102; 2*_rateLaw16*S51;
  R556: S52 => S109; _rateLaw16*S52;
  R557: S54 => S120; _rateLaw16*S54;
  R558: S62 => S20; _rateLaw17*S62;
  R559: S75 => S22; _rateLaw17*S75;
  R560: S76 => S30; _rateLaw17*S76;
  R561: S83 => S31; _rateLaw17*S83;
  R562: S58 => S113; _rateLaw18*S58;
  R563: S59 => S112; _rateLaw18*S59;
  R564: S60 => S24; _rateLaw19*S60;
  R565: S87 => S40; _rateLaw19*S87;
  R566: S88 => S39; _rateLaw19*S88;
  R567: S50 => S103; _rateLaw20*S50;
  R568: S52 => S104; _rateLaw20*S52;
  R569: S57 => S110; 2*_rateLaw20*S57;
  R570: S58 => S121; _rateLaw20*S58;
  R571: S63 => S24; _rateLaw21*S63;
  R572: S77 => S25; _rateLaw21*S77;
  R573: S78 => S32; _rateLaw21*S78;
  R574: S84 => S38; _rateLaw21*S84;
  R575: S50 => S105; _rateLaw22*S50;
  R576: S52 => S106; _rateLaw22*S52;
  R577: S57 => S111; 2*_rateLaw22*S57;
  R578: S59 => S122; _rateLaw22*S59;
  R579: S64 => S24; _rateLaw23*S64;
  R580: S79 => S26; _rateLaw23*S79;
  R581: S80 => S31; _rateLaw23*S80;
  R582: S85 => S38; _rateLaw23*S85;
  R583: S55 => S99; _rateLaw24*S55;
  R584: S56 => S100; _rateLaw24*S56;
  R585: S59 => S108; _rateLaw24*S59;
  R586: S86 => S119; 2*_rateLaw24*S86;
  R587: S61 => S27; _rateLaw25*S61;
  R588: S73 => S35; _rateLaw25*S73;
  R589: S74 => S36; _rateLaw25*S74;
  R590: S82 => S40; _rateLaw25*S82;
  R591: S53 => S101; _rateLaw26*S53;
  R592: S54 => S102; _rateLaw26*S54;
  R593: S58 => S109; _rateLaw26*S58;
  R594: S86 => S120; 2*_rateLaw26*S86;
  R595: S62 => S27; _rateLaw27*S62;
  R596: S75 => S33; _rateLaw27*S75;
  R597: S76 => S34; _rateLaw27*S76;
  R598: S83 => S39; _rateLaw27*S83;
  R599: S53 => S103; _rateLaw28*S53;
  R600: S54 => S104; _rateLaw28*S54;
  R601: S58 => S110; _rateLaw28*S58;
  R602: S86 => S121; 2*_rateLaw28*S86;
  R603: S63 => S27; _rateLaw29*S63;
  R604: S77 => S33; _rateLaw29*S77;
  R605: S78 => S34; _rateLaw29*S78;
  R606: S84 => S39; _rateLaw29*S84;
  R607: S55 => S105; _rateLaw30*S55;
  R608: S56 => S106; _rateLaw30*S56;
  R609: S59 => S111; _rateLaw30*S59;
  R610: S86 => S122; 2*_rateLaw30*S86;
  R611: S64 => S27; _rateLaw31*S64;
  R612: S79 => S35; _rateLaw31*S79;
  R613: S80 => S36; _rateLaw31*S80;
  R614: S85 => S40; _rateLaw31*S85;
  R615: S60 => S114; _rateLaw32*S60;
  R616: S89 => S42; _rateLaw33*S89;
  R617: S60 => S115; _rateLaw34*S60;
  R618: S90 => S43; _rateLaw35*S90;
  R619: S61 => S114; _rateLaw36*S61;
  R620: S89 => S44; _rateLaw37*S89;
  R621: S62 => S115; _rateLaw38*S62;
  R622: S90 => S45; _rateLaw39*S90;
  R623: S63 => S114; _rateLaw40*S63;
  R624: S89 => S46; _rateLaw41*S89;
  R625: S64 => S115; _rateLaw42*S64;
  R626: S90 => S47; _rateLaw43*S90;
  R627: S91 => S93; _rateLaw2*S91;
  R628: S91 => S92; _rateLaw2*S91;
  R629: S92 => S94; _rateLaw2*S92;
  R630: S93 => S94; _rateLaw2*S93;
  R631: S95 => S96; _rateLaw2*S95;
  R632: S97 => S98; _rateLaw2*S97;
  R633: S99 => S100; _rateLaw2*S99;
  R634: S101 => S102; _rateLaw2*S101;
  R635: S103 => S104; _rateLaw2*S103;
  R636: S105 => S106; _rateLaw2*S105;
  R637: S116 => S117; _rateLaw2*S116;
  R638: S92 => S91; _rateLaw3*S92;
  R639: S93 => S91; _rateLaw3*S93;
  R640: S94 => S92; _rateLaw3*S94;
  R641: S94 => S93; _rateLaw3*S94;
  R642: S96 => S95; _rateLaw3*S96;
  R643: S98 => S97; _rateLaw3*S98;
  R644: S100 => S99; _rateLaw3*S100;
  R645: S102 => S101; _rateLaw3*S102;
  R646: S104 => S103; _rateLaw3*S104;
  R647: S106 => S105; _rateLaw3*S106;
  R648: S117 => S116; _rateLaw3*S117;
  R649: S_CSH2_NSH2_C_PTP_C + S116 => S123; _rateLaw4*S_CSH2_NSH2_C_PTP_C*S116;
  R650: S_CSH2_NSH2_O_PTP_O + S116 => S124; _rateLaw4*S_CSH2_NSH2_O_PTP_O*S116;
  R651: S_CSH2_NSH2_C_PTP_C + S117 => S124; _rateLaw4*S_CSH2_NSH2_C_PTP_C*S117;
  R652: S_CSH2_NSH2_O_PTP_O + S117 => S125; _rateLaw4*S_CSH2_NSH2_O_PTP_O*S117;
  R653: S_CSH2_NSH2_C_PTP_C + S118 => S126; _rateLaw4*S_CSH2_NSH2_C_PTP_C*S118;
  R654: S_CSH2_NSH2_O_PTP_O + S118 => S127; _rateLaw4*S_CSH2_NSH2_O_PTP_O*S118;
  R655: S_CSH2_NSH2_C_PTP_C + S119 => S128; _rateLaw4*S_CSH2_NSH2_C_PTP_C*S119;
  R656: S_CSH2_NSH2_O_PTP_O + S119 => S129; _rateLaw4*S_CSH2_NSH2_O_PTP_O*S119;
  R657: S_CSH2_NSH2_C_PTP_C + S120 => S130; _rateLaw4*S_CSH2_NSH2_C_PTP_C*S120;
  R658: S_CSH2_NSH2_O_PTP_O + S120 => S131; _rateLaw4*S_CSH2_NSH2_O_PTP_O*S120;
  R659: S_CSH2_NSH2_C_PTP_C + S121 => S132; _rateLaw4*S_CSH2_NSH2_C_PTP_C*S121;
  R660: S_CSH2_NSH2_O_PTP_O + S121 => S133; _rateLaw4*S_CSH2_NSH2_O_PTP_O*S121;
  R661: S_CSH2_NSH2_C_PTP_C + S122 => S134; _rateLaw4*S_CSH2_NSH2_C_PTP_C*S122;
  R662: S_CSH2_NSH2_O_PTP_O + S122 => S135; _rateLaw4*S_CSH2_NSH2_O_PTP_O*S122;
  R663: S91 => S_CSH2_NSH2_C_PTP_C + S55; _rateLaw5*S91;
  R664: S91 => S_CSH2_NSH2_C_PTP_C + S53; _rateLaw5*S91;
  R665: S92 => S_CSH2_NSH2_C_PTP_C + S56; _rateLaw5*S92;
  R666: S92 => S_CSH2_NSH2_O_PTP_O + S53; _rateLaw5*S92;
  R667: S93 => S_CSH2_NSH2_O_PTP_O + S55; _rateLaw5*S93;
  R668: S93 => S_CSH2_NSH2_C_PTP_C + S54; _rateLaw5*S93;
  R669: S94 => S_CSH2_NSH2_O_PTP_O + S56; _rateLaw5*S94;
  R670: S94 => S_CSH2_NSH2_O_PTP_O + S54; _rateLaw5*S94;
  R671: S95 => S_CSH2_NSH2_C_PTP_C + S58; _rateLaw5*S95;
  R672: S96 => S_CSH2_NSH2_O_PTP_O + S58; _rateLaw5*S96;
  R673: S97 => S_CSH2_NSH2_C_PTP_C + S59; _rateLaw5*S97;
  R674: S98 => S_CSH2_NSH2_O_PTP_O + S59; _rateLaw5*S98;
  R675: S99 => S_CSH2_NSH2_C_PTP_C + S61; _rateLaw5*S99;
  R676: S100 => S_CSH2_NSH2_O_PTP_O + S61; _rateLaw5*S100;
  R677: S101 => S_CSH2_NSH2_C_PTP_C + S62; _rateLaw5*S101;
  R678: S102 => S_CSH2_NSH2_O_PTP_O + S62; _rateLaw5*S102;
  R679: S103 => S_CSH2_NSH2_C_PTP_C + S63; _rateLaw5*S103;
  R680: S104 => S_CSH2_NSH2_O_PTP_O + S63; _rateLaw5*S104;
  R681: S105 => S_CSH2_NSH2_C_PTP_C + S64; _rateLaw5*S105;
  R682: S106 => S_CSH2_NSH2_O_PTP_O + S64; _rateLaw5*S106;
  R683: S116 => S_CSH2_NSH2_C_PTP_C + S86; _rateLaw5*S116;
  R684: S117 => S_CSH2_NSH2_O_PTP_O + S86; _rateLaw5*S117;
  R685: S_CSH2_NSH2_O_PTP_O + S116 => S126; _rateLaw6*S_CSH2_NSH2_O_PTP_O*S116;
  R686: S_CSH2_NSH2_O_PTP_O + S117 => S127; _rateLaw6*S_CSH2_NSH2_O_PTP_O*S117;
  R687: S_CSH2_NSH2_O_PTP_O + S118 => S136; _rateLaw6*S_CSH2_NSH2_O_PTP_O*S118;
  R688: S_CSH2_NSH2_O_PTP_O + S119 => S137; _rateLaw6*S_CSH2_NSH2_O_PTP_O*S119;
  R689: S_CSH2_NSH2_O_PTP_O + S120 => S138; _rateLaw6*S_CSH2_NSH2_O_PTP_O*S120;
  R690: S_CSH2_NSH2_O_PTP_O + S121 => S139; _rateLaw6*S_CSH2_NSH2_O_PTP_O*S121;
  R691: S_CSH2_NSH2_O_PTP_O + S122 => S140; _rateLaw6*S_CSH2_NSH2_O_PTP_O*S122;
  R692: S95 => S_CSH2_NSH2_O_PTP_O + S55; _rateLaw7*S95;
  R693: S96 => S_CSH2_NSH2_O_PTP_O + S56; _rateLaw7*S96;
  R694: S97 => S_CSH2_NSH2_O_PTP_O + S53; _rateLaw7*S97;
  R695: S98 => S_CSH2_NSH2_O_PTP_O + S54; _rateLaw7*S98;
  R696: S107 => S_CSH2_NSH2_O_PTP_O + S59; _rateLaw7*S107;
  R697: S107 => S_CSH2_NSH2_O_PTP_O + S58; _rateLaw7*S107;
  R698: S108 => S_CSH2_NSH2_O_PTP_O + S61; _rateLaw7*S108;
  R699: S109 => S_CSH2_NSH2_O_PTP_O + S62; _rateLaw7*S109;
  R700: S110 => S_CSH2_NSH2_O_PTP_O + S63; _rateLaw7*S110;
  R701: S111 => S_CSH2_NSH2_O_PTP_O + S64; _rateLaw7*S111;
  R702: S118 => S_CSH2_NSH2_O_PTP_O + S86; _rateLaw7*S118;
  R703: S_CSH2_NSH2_O_PTP_O + S91 => S123; _rateLaw8*S_CSH2_NSH2_O_PTP_O*S91;
  R704: S_CSH2_NSH2_O_PTP_O + S92 => S124; _rateLaw8*S_CSH2_NSH2_O_PTP_O*S92;
  R705: S_CSH2_NSH2_O_PTP_O + S93 => S124; _rateLaw8*S_CSH2_NSH2_O_PTP_O*S93;
  R706: S_CSH2_NSH2_O_PTP_O + S94 => S125; _rateLaw8*S_CSH2_NSH2_O_PTP_O*S94;
  R707: S_CSH2_NSH2_O_PTP_O + S95 => S126; _rateLaw8*S_CSH2_NSH2_O_PTP_O*S95;
  R708: S_CSH2_NSH2_O_PTP_O + S96 => S127; _rateLaw8*S_CSH2_NSH2_O_PTP_O*S96;
  R709: S_CSH2_NSH2_O_PTP_O + S97 => S126; _rateLaw8*S_CSH2_NSH2_O_PTP_O*S97;
  R710: S_CSH2_NSH2_O_PTP_O + S98 => S127; _rateLaw8*S_CSH2_NSH2_O_PTP_O*S98;
  R711: S_CSH2_NSH2_O_PTP_O + S99 => S128; _rateLaw8*S_CSH2_NSH2_O_PTP_O*S99;
  R712: S_CSH2_NSH2_O_PTP_O + S100 => S129; _rateLaw8*S_CSH2_NSH2_O_PTP_O*S100;
  R713: S_CSH2_NSH2_O_PTP_O + S101 => S130; _rateLaw8*S_CSH2_NSH2_O_PTP_O*S101;
  R714: S_CSH2_NSH2_O_PTP_O + S102 => S131; _rateLaw8*S_CSH2_NSH2_O_PTP_O*S102;
  R715: S_CSH2_NSH2_O_PTP_O + S103 => S132; _rateLaw8*S_CSH2_NSH2_O_PTP_O*S103;
  R716: S_CSH2_NSH2_O_PTP_O + S104 => S133; _rateLaw8*S_CSH2_NSH2_O_PTP_O*S104;
  R717: S_CSH2_NSH2_O_PTP_O + S105 => S134; _rateLaw8*S_CSH2_NSH2_O_PTP_O*S105;
  R718: S_CSH2_NSH2_O_PTP_O + S106 => S135; _rateLaw8*S_CSH2_NSH2_O_PTP_O*S106;
  R719: S_CSH2_NSH2_O_PTP_O + S107 => S136; _rateLaw8*S_CSH2_NSH2_O_PTP_O*S107;
  R720: S_CSH2_NSH2_O_PTP_O + S108 => S137; _rateLaw8*S_CSH2_NSH2_O_PTP_O*S108;
  R721: S_CSH2_NSH2_O_PTP_O + S109 => S138; _rateLaw8*S_CSH2_NSH2_O_PTP_O*S109;
  R722: S_CSH2_NSH2_O_PTP_O + S110 => S139; _rateLaw8*S_CSH2_NSH2_O_PTP_O*S110;
  R723: S_CSH2_NSH2_O_PTP_O + S111 => S140; _rateLaw8*S_CSH2_NSH2_O_PTP_O*S111;
  R724: S_CSH2_NSH2_O_PTP_O + S112 => S141; _rateLaw8*S_CSH2_NSH2_O_PTP_O*S112;
  R725: S_CSH2_NSH2_O_PTP_O + S113 => S141; _rateLaw8*S_CSH2_NSH2_O_PTP_O*S113;
  R726: S_CSH2_NSH2_O_PTP_O + S114 => S142; _rateLaw8*S_CSH2_NSH2_O_PTP_O*S114;
  R727: S_CSH2_NSH2_O_PTP_O + S115 => S143; _rateLaw8*S_CSH2_NSH2_O_PTP_O*S115;
  R728: S91 => S_CSH2_NSH2_O_PTP_O + S48; _rateLaw9*S91;
  R729: S92 => S_CSH2_NSH2_O_PTP_O + S49; _rateLaw9*S92;
  R730: S93 => S_CSH2_NSH2_O_PTP_O + S49; _rateLaw9*S93;
  R731: S94 => S_CSH2_NSH2_O_PTP_O + S51; _rateLaw9*S94;
  R732: S95 => S_CSH2_NSH2_O_PTP_O + S50; _rateLaw9*S95;
  R733: S96 => S_CSH2_NSH2_O_PTP_O + S52; _rateLaw9*S96;
  R734: S97 => S_CSH2_NSH2_O_PTP_O + S50; _rateLaw9*S97;
  R735: S98 => S_CSH2_NSH2_O_PTP_O + S52; _rateLaw9*S98;
  R736: S107 => S_CSH2_NSH2_O_PTP_O + S57; _rateLaw9*S107;
  R737: S112 => S_CSH2_NSH2_O_PTP_O + S60; _rateLaw9*S112;
  R738: S113 => S_CSH2_NSH2_O_PTP_O + S60; _rateLaw9*S113;
  R739: S116 => S_CSH2_NSH2_O_PTP_O + S55; _rateLaw9*S116;
  R740: S116 => S_CSH2_NSH2_O_PTP_O + S53; _rateLaw9*S116;
  R741: S117 => S_CSH2_NSH2_O_PTP_O + S56; _rateLaw9*S117;
  R742: S117 => S_CSH2_NSH2_O_PTP_O + S54; _rateLaw9*S117;
  R743: S118 => S_CSH2_NSH2_O_PTP_O + S59; _rateLaw9*S118;
  R744: S118 => S_CSH2_NSH2_O_PTP_O + S58; _rateLaw9*S118;
  R745: S119 => S_CSH2_NSH2_O_PTP_O + S61; _rateLaw9*S119;
  R746: S120 => S_CSH2_NSH2_O_PTP_O + S62; _rateLaw9*S120;
  R747: S121 => S_CSH2_NSH2_O_PTP_O + S63; _rateLaw9*S121;
  R748: S122 => S_CSH2_NSH2_O_PTP_O + S64; _rateLaw9*S122;
  R749: S91 => S_CSH2_NSH2_O_PTP_O + S21; _rateLaw10*S91;
  R750: S92 => S_CSH2_NSH2_O_PTP_O + S23; _rateLaw10*S92;
  R751: S93 => S_CSH2_NSH2_O_PTP_O + S22; _rateLaw10*S93;
  R752: S94 => S_CSH2_NSH2_O_PTP_O + S30; _rateLaw10*S94;
  R753: S95 => S_CSH2_NSH2_O_PTP_O + S25; _rateLaw10*S95;
  R754: S96 => S_CSH2_NSH2_O_PTP_O + S32; _rateLaw10*S96;
  R755: S97 => S_CSH2_NSH2_O_PTP_O + S26; _rateLaw10*S97;
  R756: S98 => S_CSH2_NSH2_O_PTP_O + S31; _rateLaw10*S98;
  R757: S107 => S_CSH2_NSH2_O_PTP_O + S38; _rateLaw10*S107;
  R758: S112 => S_CSH2_NSH2_O_PTP_O + S43; _rateLaw10*S112;
  R759: S113 => S_CSH2_NSH2_O_PTP_O + S42; _rateLaw10*S113;
  R760: S116 => S_CSH2_NSH2_O_PTP_O + S35; _rateLaw10*S116;
  R761: S116 => S_CSH2_NSH2_O_PTP_O + S33; _rateLaw10*S116;
  R762: S117 => S_CSH2_NSH2_O_PTP_O + S36; _rateLaw10*S117;
  R763: S117 => S_CSH2_NSH2_O_PTP_O + S34; _rateLaw10*S117;
  R764: S118 => S_CSH2_NSH2_O_PTP_O + S40; _rateLaw10*S118;
  R765: S118 => S_CSH2_NSH2_O_PTP_O + S39; _rateLaw10*S118;
  R766: S119 => S_CSH2_NSH2_O_PTP_O + S44; _rateLaw10*S119;
  R767: S120 => S_CSH2_NSH2_O_PTP_O + S45; _rateLaw10*S120;
  R768: S121 => S_CSH2_NSH2_O_PTP_O + S46; _rateLaw10*S121;
  R769: S122 => S_CSH2_NSH2_O_PTP_O + S47; _rateLaw10*S122;
  R770: S99 => S22; _rateLaw11*S99;
  R771: S100 => S30; _rateLaw11*S100;
  R772: S101 => S23; _rateLaw11*S101;
  R773: S102 => S30; _rateLaw11*S102;
  R774: S103 => S26; _rateLaw11*S103;
  R775: S104 => S31; _rateLaw11*S104;
  R776: S105 => S25; _rateLaw11*S105;
  R777: S106 => S32; _rateLaw11*S106;
  R778: S108 => S31; _rateLaw11*S108;
  R779: S109 => S32; _rateLaw11*S109;
  R780: S110 => S38; _rateLaw11*S110;
  R781: S111 => S38; _rateLaw11*S111;
  R782: S114 => S43; _rateLaw11*S114;
  R783: S115 => S42; _rateLaw11*S115;
  R784: S119 => S36; _rateLaw11*S119;
  R785: S120 => S34; _rateLaw11*S120;
  R786: S121 => S39; _rateLaw11*S121;
  R787: S122 => S40; _rateLaw11*S122;
  R788: S117 => S141; _rateLaw12*S117;
  R789: S112 => S54; _rateLaw13*S112;
  R790: S113 => S56; _rateLaw13*S113;
  R791: S92 => S128; _rateLaw14*S92;
  R792: S94 => S129; _rateLaw14*S94;
  R793: S96 => S137; _rateLaw14*S96;
  R794: S100 => S144; _rateLaw14*S100;
  R795: S106 => S145; _rateLaw14*S106;
  R796: S99 => S49; _rateLaw15*S99;
  R797: S100 => S51; _rateLaw15*S100;
  R798: S108 => S52; _rateLaw15*S108;
  R799: S119 => S56; _rateLaw15*S119;
  R800: S93 => S130; _rateLaw16*S93;
  R801: S94 => S131; _rateLaw16*S94;
  R802: S98 => S138; _rateLaw16*S98;
  R803: S102 => S146; _rateLaw16*S102;
  R804: S104 => S147; _rateLaw16*S104;
  R805: S101 => S49; _rateLaw17*S101;
  R806: S102 => S51; _rateLaw17*S102;
  R807: S109 => S52; _rateLaw17*S109;
  R808: S120 => S54; _rateLaw17*S120;
  R809: S118 => S141; _rateLaw18*S118;
  R810: S112 => S59; _rateLaw19*S112;
  R811: S113 => S58; _rateLaw19*S113;
  R812: S95 => S132; _rateLaw20*S95;
  R813: S96 => S133; _rateLaw20*S96;
  R814: S107 => S139; _rateLaw20*S107;
  R815: S109 => S147; _rateLaw20*S109;
  R816: S110 => S148; _rateLaw20*S110;
  R817: S103 => S50; _rateLaw21*S103;
  R818: S104 => S52; _rateLaw21*S104;
  R819: S110 => S57; _rateLaw21*S110;
  R820: S121 => S58; _rateLaw21*S121;
  R821: S97 => S134; _rateLaw22*S97;
  R822: S98 => S135; _rateLaw22*S98;
  R823: S107 => S140; _rateLaw22*S107;
  R824: S108 => S145; _rateLaw22*S108;
  R825: S111 => S149; _rateLaw22*S111;
  R826: S105 => S50; _rateLaw23*S105;
  R827: S106 => S52; _rateLaw23*S106;
  R828: S111 => S57; _rateLaw23*S111;
  R829: S122 => S59; _rateLaw23*S122;
  R830: S116 => S128; _rateLaw24*S116;
  R831: S117 => S129; _rateLaw24*S117;
  R832: S118 => S137; _rateLaw24*S118;
  R833: S119 => S144; _rateLaw24*S119;
  R834: S122 => S145; _rateLaw24*S122;
  R835: S99 => S55; _rateLaw25*S99;
  R836: S100 => S56; _rateLaw25*S100;
  R837: S108 => S59; _rateLaw25*S108;
  R838: S119 => S86; _rateLaw25*S119;
  R839: S116 => S130; _rateLaw26*S116;
  R840: S117 => S131; _rateLaw26*S117;
  R841: S118 => S138; _rateLaw26*S118;
  R842: S120 => S146; _rateLaw26*S120;
  R843: S121 => S147; _rateLaw26*S121;
  R844: S101 => S53; _rateLaw27*S101;
  R845: S102 => S54; _rateLaw27*S102;
  R846: S109 => S58; _rateLaw27*S109;
  R847: S120 => S86; _rateLaw27*S120;
  R848: S116 => S132; _rateLaw28*S116;
  R849: S117 => S133; _rateLaw28*S117;
  R850: S118 => S139; _rateLaw28*S118;
  R851: S120 => S147; _rateLaw28*S120;
  R852: S121 => S148; _rateLaw28*S121;
  R853: S103 => S53; _rateLaw29*S103;
  R854: S104 => S54; _rateLaw29*S104;
  R855: S110 => S58; _rateLaw29*S110;
  R856: S121 => S86; _rateLaw29*S121;
  R857: S116 => S134; _rateLaw30*S116;
  R858: S117 => S135; _rateLaw30*S117;
  R859: S118 => S140; _rateLaw30*S118;
  R860: S119 => S145; _rateLaw30*S119;
  R861: S122 => S149; _rateLaw30*S122;
  R862: S105 => S55; _rateLaw31*S105;
  R863: S106 => S56; _rateLaw31*S106;
  R864: S111 => S59; _rateLaw31*S111;
  R865: S122 => S86; _rateLaw31*S122;
  R866: S113 => S142; _rateLaw32*S113;
  R867: S114 => S60; _rateLaw33*S114;
  R868: S112 => S143; _rateLaw34*S112;
  R869: S115 => S60; _rateLaw35*S115;
  R870: S119 => S142; _rateLaw36*S119;
  R871: S114 => S61; _rateLaw37*S114;
  R872: S120 => S143; _rateLaw38*S120;
  R873: S115 => S62; _rateLaw39*S115;
  R874: S121 => S142; _rateLaw40*S121;
  R875: S114 => S63; _rateLaw41*S114;
  R876: S122 => S143; _rateLaw42*S122;
  R877: S115 => S64; _rateLaw43*S115;
  R878: S123 => S124; 2*_rateLaw2*S123;
  R879: S124 => S125; _rateLaw2*S124;
  R880: S126 => S127; _rateLaw2*S126;
  R881: S128 => S129; _rateLaw2*S128;
  R882: S130 => S131; _rateLaw2*S130;
  R883: S132 => S133; _rateLaw2*S132;
  R884: S134 => S135; _rateLaw2*S134;
  R885: S124 => S123; _rateLaw3*S124;
  R886: S125 => S124; 2*_rateLaw3*S125;
  R887: S127 => S126; _rateLaw3*S127;
  R888: S129 => S128; _rateLaw3*S129;
  R889: S131 => S130; _rateLaw3*S131;
  R890: S133 => S132; _rateLaw3*S133;
  R891: S135 => S134; _rateLaw3*S135;
  R892: S123 => S_CSH2_NSH2_C_PTP_C + S116; 2*_rateLaw5*S123;
  R893: S124 => S_CSH2_NSH2_C_PTP_C + S117; _rateLaw5*S124;
  R894: S124 => S_CSH2_NSH2_O_PTP_O + S116; _rateLaw5*S124;
  R895: S125 => S_CSH2_NSH2_O_PTP_O + S117; 2*_rateLaw5*S125;
  R896: S126 => S_CSH2_NSH2_C_PTP_C + S118; _rateLaw5*S126;
  R897: S127 => S_CSH2_NSH2_O_PTP_O + S118; _rateLaw5*S127;
  R898: S128 => S_CSH2_NSH2_C_PTP_C + S119; _rateLaw5*S128;
  R899: S129 => S_CSH2_NSH2_O_PTP_O + S119; _rateLaw5*S129;
  R900: S130 => S_CSH2_NSH2_C_PTP_C + S120; _rateLaw5*S130;
  R901: S131 => S_CSH2_NSH2_O_PTP_O + S120; _rateLaw5*S131;
  R902: S132 => S_CSH2_NSH2_C_PTP_C + S121; _rateLaw5*S132;
  R903: S133 => S_CSH2_NSH2_O_PTP_O + S121; _rateLaw5*S133;
  R904: S134 => S_CSH2_NSH2_C_PTP_C + S122; _rateLaw5*S134;
  R905: S135 => S_CSH2_NSH2_O_PTP_O + S122; _rateLaw5*S135;
  R906: S126 => S_CSH2_NSH2_O_PTP_O + S116; _rateLaw7*S126;
  R907: S127 => S_CSH2_NSH2_O_PTP_O + S117; _rateLaw7*S127;
  R908: S136 => S_CSH2_NSH2_O_PTP_O + S118; 2*_rateLaw7*S136;
  R909: S137 => S_CSH2_NSH2_O_PTP_O + S119; _rateLaw7*S137;
  R910: S138 => S_CSH2_NSH2_O_PTP_O + S120; _rateLaw7*S138;
  R911: S139 => S_CSH2_NSH2_O_PTP_O + S121; _rateLaw7*S139;
  R912: S140 => S_CSH2_NSH2_O_PTP_O + S122; _rateLaw7*S140;
  R913: S123 => S_CSH2_NSH2_O_PTP_O + S91; 2*_rateLaw9*S123;
  R914: S124 => S_CSH2_NSH2_O_PTP_O + S93; _rateLaw9*S124;
  R915: S124 => S_CSH2_NSH2_O_PTP_O + S92; _rateLaw9*S124;
  R916: S125 => S_CSH2_NSH2_O_PTP_O + S94; 2*_rateLaw9*S125;
  R917: S126 => S_CSH2_NSH2_O_PTP_O + S97; _rateLaw9*S126;
  R918: S126 => S_CSH2_NSH2_O_PTP_O + S95; _rateLaw9*S126;
  R919: S127 => S_CSH2_NSH2_O_PTP_O + S98; _rateLaw9*S127;
  R920: S127 => S_CSH2_NSH2_O_PTP_O + S96; _rateLaw9*S127;
  R921: S128 => S_CSH2_NSH2_O_PTP_O + S99; _rateLaw9*S128;
  R922: S129 => S_CSH2_NSH2_O_PTP_O + S100; _rateLaw9*S129;
  R923: S130 => S_CSH2_NSH2_O_PTP_O + S101; _rateLaw9*S130;
  R924: S131 => S_CSH2_NSH2_O_PTP_O + S102; _rateLaw9*S131;
  R925: S132 => S_CSH2_NSH2_O_PTP_O + S103; _rateLaw9*S132;
  R926: S133 => S_CSH2_NSH2_O_PTP_O + S104; _rateLaw9*S133;
  R927: S134 => S_CSH2_NSH2_O_PTP_O + S105; _rateLaw9*S134;
  R928: S135 => S_CSH2_NSH2_O_PTP_O + S106; _rateLaw9*S135;
  R929: S136 => S_CSH2_NSH2_O_PTP_O + S107; 2*_rateLaw9*S136;
  R930: S137 => S_CSH2_NSH2_O_PTP_O + S108; _rateLaw9*S137;
  R931: S138 => S_CSH2_NSH2_O_PTP_O + S109; _rateLaw9*S138;
  R932: S139 => S_CSH2_NSH2_O_PTP_O + S110; _rateLaw9*S139;
  R933: S140 => S_CSH2_NSH2_O_PTP_O + S111; _rateLaw9*S140;
  R934: S141 => S_CSH2_NSH2_O_PTP_O + S113; _rateLaw9*S141;
  R935: S141 => S_CSH2_NSH2_O_PTP_O + S112; _rateLaw9*S141;
  R936: S142 => S_CSH2_NSH2_O_PTP_O + S114; _rateLaw9*S142;
  R937: S143 => S_CSH2_NSH2_O_PTP_O + S115; _rateLaw9*S143;
  R938: S123 => S_CSH2_NSH2_O_PTP_O + S65; 2*_rateLaw10*S123;
  R939: S124 => S_CSH2_NSH2_O_PTP_O + S67; _rateLaw10*S124;
  R940: S124 => S_CSH2_NSH2_O_PTP_O + S66; _rateLaw10*S124;
  R941: S125 => S_CSH2_NSH2_O_PTP_O + S68; 2*_rateLaw10*S125;
  R942: S126 => S_CSH2_NSH2_O_PTP_O + S71; _rateLaw10*S126;
  R943: S126 => S_CSH2_NSH2_O_PTP_O + S69; _rateLaw10*S126;
  R944: S127 => S_CSH2_NSH2_O_PTP_O + S72; _rateLaw10*S127;
  R945: S127 => S_CSH2_NSH2_O_PTP_O + S70; _rateLaw10*S127;
  R946: S128 => S_CSH2_NSH2_O_PTP_O + S73; _rateLaw10*S128;
  R947: S129 => S_CSH2_NSH2_O_PTP_O + S74; _rateLaw10*S129;
  R948: S130 => S_CSH2_NSH2_O_PTP_O + S75; _rateLaw10*S130;
  R949: S131 => S_CSH2_NSH2_O_PTP_O + S76; _rateLaw10*S131;
  R950: S132 => S_CSH2_NSH2_O_PTP_O + S77; _rateLaw10*S132;
  R951: S133 => S_CSH2_NSH2_O_PTP_O + S78; _rateLaw10*S133;
  R952: S134 => S_CSH2_NSH2_O_PTP_O + S79; _rateLaw10*S134;
  R953: S135 => S_CSH2_NSH2_O_PTP_O + S80; _rateLaw10*S135;
  R954: S136 => S_CSH2_NSH2_O_PTP_O + S81; 2*_rateLaw10*S136;
  R955: S137 => S_CSH2_NSH2_O_PTP_O + S82; _rateLaw10*S137;
  R956: S138 => S_CSH2_NSH2_O_PTP_O + S83; _rateLaw10*S138;
  R957: S139 => S_CSH2_NSH2_O_PTP_O + S84; _rateLaw10*S139;
  R958: S140 => S_CSH2_NSH2_O_PTP_O + S85; _rateLaw10*S140;
  R959: S141 => S_CSH2_NSH2_O_PTP_O + S88; _rateLaw10*S141;
  R960: S141 => S_CSH2_NSH2_O_PTP_O + S87; _rateLaw10*S141;
  R961: S142 => S_CSH2_NSH2_O_PTP_O + S89; _rateLaw10*S142;
  R962: S143 => S_CSH2_NSH2_O_PTP_O + S90; _rateLaw10*S143;
  R963: S128 => S66; _rateLaw11*S128;
  R964: S129 => S68; _rateLaw11*S129;
  R965: S130 => S67; _rateLaw11*S130;
  R966: S131 => S68; _rateLaw11*S131;
  R967: S132 => S69; _rateLaw11*S132;
  R968: S133 => S70; _rateLaw11*S133;
  R969: S134 => S71; _rateLaw11*S134;
  R970: S135 => S72; _rateLaw11*S135;
  R971: S137 => S70; _rateLaw11*S137;
  R972: S138 => S72; _rateLaw11*S138;
  R973: S139 => S81; _rateLaw11*S139;
  R974: S140 => S81; _rateLaw11*S140;
  R975: S142 => S88; _rateLaw11*S142;
  R976: S143 => S87; _rateLaw11*S143;
  R977: S144 => S74; 2*_rateLaw11*S144;
  R978: S145 => S82; _rateLaw11*S145;
  R979: S145 => S80; _rateLaw11*S145;
  R980: S146 => S76; 2*_rateLaw11*S146;
  R981: S147 => S83; _rateLaw11*S147;
  R982: S147 => S78; _rateLaw11*S147;
  R983: S148 => S84; 2*_rateLaw11*S148;
  R984: S149 => S85; 2*_rateLaw11*S149;
  R985: S141 => S117; _rateLaw13*S141;
  R986: S128 => S92; _rateLaw15*S128;
  R987: S129 => S94; _rateLaw15*S129;
  R988: S137 => S96; _rateLaw15*S137;
  R989: S144 => S100; 2*_rateLaw15*S144;
  R990: S145 => S106; _rateLaw15*S145;
  R991: S130 => S93; _rateLaw17*S130;
  R992: S131 => S94; _rateLaw17*S131;
  R993: S138 => S98; _rateLaw17*S138;
  R994: S146 => S102; 2*_rateLaw17*S146;
  R995: S147 => S104; _rateLaw17*S147;
  R996: S141 => S118; _rateLaw19*S141;
  R997: S132 => S95; _rateLaw21*S132;
  R998: S133 => S96; _rateLaw21*S133;
  R999: S139 => S107; _rateLaw21*S139;
  R1000: S147 => S109; _rateLaw21*S147;
  R1001: S148 => S110; 2*_rateLaw21*S148;
  R1002: S134 => S97; _rateLaw23*S134;
  R1003: S135 => S98; _rateLaw23*S135;
  R1004: S140 => S107; _rateLaw23*S140;
  R1005: S145 => S108; _rateLaw23*S145;
  R1006: S149 => S111; 2*_rateLaw23*S149;
  R1007: S128 => S116; _rateLaw25*S128;
  R1008: S129 => S117; _rateLaw25*S129;
  R1009: S137 => S118; _rateLaw25*S137;
  R1010: S144 => S119; 2*_rateLaw25*S144;
  R1011: S145 => S122; _rateLaw25*S145;
  R1012: S130 => S116; _rateLaw27*S130;
  R1013: S131 => S117; _rateLaw27*S131;
  R1014: S138 => S118; _rateLaw27*S138;
  R1015: S146 => S120; 2*_rateLaw27*S146;
  R1016: S147 => S121; _rateLaw27*S147;
  R1017: S132 => S116; _rateLaw29*S132;
  R1018: S133 => S117; _rateLaw29*S133;
  R1019: S139 => S118; _rateLaw29*S139;
  R1020: S147 => S120; _rateLaw29*S147;
  R1021: S148 => S121; 2*_rateLaw29*S148;
  R1022: S134 => S116; _rateLaw31*S134;
  R1023: S135 => S117; _rateLaw31*S135;
  R1024: S140 => S118; _rateLaw31*S140;
  R1025: S145 => S119; _rateLaw31*S145;
  R1026: S149 => S122; 2*_rateLaw31*S149;
  R1027: S142 => S113; _rateLaw33*S142;
  R1028: S143 => S112; _rateLaw35*S143;
  R1029: S142 => S119; _rateLaw37*S142;
  R1030: S143 => S120; _rateLaw39*S143;
  R1031: S142 => S121; _rateLaw41*S142;
  R1032: S143 => S122; _rateLaw43*S143;

  // Unit definitions:
  unit substance = item;
end
