// SBML level 2 version 3

model mRNA_self_reg()

  // Compartments:
  compartment cell = 1;

  // Species:
  species S1 in cell = 10/cell; S1 is "mRNA()";
  species S2 in cell = 5/cell; S2 is "p1()";
  species S3 in cell = 0; S3 is "p2()";

  // Parameters:
  param0 = 10;
  param1 = 0.5;
  param2 = 10;
  param3 = 2;
  dummy = 5;
  param4 = 1;

  // Assignment rules:
  mRNA := 0 + S1;
  p1 := 0 + S2;
  p2 := 0 + S3;
  _rateLaw1 := p1*param2;
  _rateLaw2 := p2*param3;

  // Reactions:
  R1: => S1; _rateLaw1;
  R2: S1 => ; _rateLaw2*S1;
  R3: S1 => ; param4*S1;
  R4: S1 => S2; param0*S1;
  R5: S2 => S3; param1*S2;
  R6: S2 => ; param4*S2;
  R7: S3 => ; param4*S3;

  // Unit definitions:
  unit substance = item;
end
